# Исходнные данные:
File := READEXCEL(".\Расчеты в Терре для всех топлив\1. Топлива.xlsx", "Sheet1!A1:U9")
# [Excel component]
    excel["A1"] := File
p_к := 5 MPa
kJ := J*1000
D := 0.5 m
τ_р := 60 s
J_т := 1500*kN*s
d := 0.02 m = 20 mm
# Решение:
P := J_т/τ_р = 25 kN
sinalpha :=
    for j ∈ 1 .. 9
        sinalpha[0, j] ← File[0, j]
        sinalpha[j, 0] ← File[0, j]
        for i ∈ 1 .. 9
            if i ≠ j
                u_11 ← File[6, j]*mm/s
                u_12 ← File[6, i]*mm/s
                v_1 ← File[7, j]
                v_2 ← File[7, i]
                sinalpha[i, j] ← u_11*(p_к/(98066.5 Pa))^v_1/(u_12*(p_к/(98066.5 Pa))^v_2)
        sinalpha
m_sum :=
    for j ∈ 1 .. 9
        m_sum[0, j] ← File[0, j]
        m_sum[j, 0] ← File[0, j]
        for i ∈ 1 .. 9
            if i ≠ j
                ρ_1 ← File[5, j]*kg/m^3
                ρ_2 ← File[5, i]*kg/m^3
                u_11 ← File[6, j]*mm/s
                u_12 ← File[6, i]*mm/s
                v_1 ← File[7, j]
                v_2 ← File[7, i]
                sinalpha[i, j] ← u_11*(p_к/(98066.5 Pa))^v_1/(u_12*(p_к/(98066.5 Pa))^v_2)
                m_1 ← ρ_1*u_12*(p_к/(98066.5 Pa))^v_2*π/4*(D^2 - d^2)
                m_2 ← ρ_2*u_12*(p_к/(98066.5 Pa))^v_2*π/4*d^2
                if sinalpha[i, j] < 1
                    if v_2 < v_1
                        m_sum[i, j] ← m_1 + m_2
        m_sum
m_1 :=
    for j ∈ 1 .. 9
        m_1[0, j] ← File[0, j]
        m_1[j, 0] ← File[0, j]
        for i ∈ 1 .. 9
            if i ≠ j
                ρ_1 ← File[5, j]*kg/m^3
                ρ_2 ← File[5, i]*kg/m^3
                u_11 ← File[6, j]*mm/s
                u_12 ← File[6, i]*mm/s
                v_1 ← File[7, j]
                v_2 ← File[7, i]
                sinalpha[i, j] ← u_11*(p_к/(98066.5 Pa))^v_1/(u_12*(p_к/(98066.5 Pa))^v_2)
                if sinalpha[i, j] < 1
                    if v_2 < v_1
                        m_1[i, j] ← ρ_1*u_12*(p_к/(98066.5 Pa))^v_2*π/4*(D^2 - d^2)
        m_1
m_2 :=
    for j ∈ 1 .. 9
        m_2[0, j] ← File[0, j]
        m_2[j, 0] ← File[0, j]
        for i ∈ 1 .. 9
            if i ≠ j
                ρ_1 ← File[5, j]*kg/m^3
                ρ_2 ← File[5, i]*kg/m^3
                u_11 ← File[6, j]*mm/s
                u_12 ← File[6, i]*mm/s
                v_1 ← File[7, j]
                v_2 ← File[7, i]
                sinalpha[i, j] ← u_11*(p_к/(98066.5 Pa))^v_1/(u_12*(p_к/(98066.5 Pa))^v_2)
                if sinalpha[i, j] < 1
                    if v_2 < v_1
                        m_2[i, j] ← ρ_2*u_12*(p_к/(98066.5 Pa))^v_2*π/4*d^2
        m_2
l :=
    for j ∈ 1 .. 9
        l[0, j] ← File[0, j]
        l[j, 0] ← File[0, j]
        for i ∈ 1 .. 9
            if i ≠ j
                ρ_1 ← File[5, j]*kg/m^3
                ρ_2 ← File[5, i]*kg/m^3
                u_11 ← File[6, j]*mm/s
                u_12 ← File[6, i]*mm/s
                v_1 ← File[7, j]
                v_2 ← File[7, i]
                sinalpha[i, j] ← u_11*(p_к/(98066.5 Pa))^v_1/(u_12*(p_к/(98066.5 Pa))^v_2)
                if sinalpha[i, j] < 1
                    if v_2 < v_1
                        l[i, j] ← (D - d)/(2*u_11/u_12*(p_к/(98066.5 Pa))^(v_1 - v_2))
        l
arcsin2 :=
    for j ∈ 1 .. 9
        arcsin2[0, j] ← File[0, j]
        arcsin2[j, 0] ← File[0, j]
        for i ∈ 1 .. 9
            if i ≠ j
                u_11 ← File[6, j]*mm/s
                u_12 ← File[6, i]*mm/s
                v_1 ← File[7, j]
                v_2 ← File[7, i]
                sinalpha[i, j] ← u_11*(p_к/(98066.5 Pa))^v_1/(u_12*(p_к/(98066.5 Pa))^v_2)
                if sinalpha[i, j] < 1
                    if v_2 < v_1
                        arcsin2[i, j] ← asin(u_11/u_12*(p_к/(98066.5 Pa))^(v_1 - v_2))/deg
        arcsin2
sinalpha = [
    0, "ARCADENE", "ARCIT-373D", "RD-2435", "TP-H-3062", "ПХА-3М", "ПХА-4М", "ПХА-5М", "ПХК-1М", "ПХН-2М";
    "ARCADENE", 0, 4.89924, 2.24207, 2.80978, 2.21364, 3.86051, 2.21364, 3.28579, 7.08591;
    "ARCIT-373D", 0.204113, 0, 0.457635, 0.573513, 0.451834, 0.787981, 0.451834, 0.670674, 1.44633;
    "RD-2435", 0.446017, 2.18515, 0, 1.25321, 0.987323, 1.72185, 0.987323, 1.46552, 3.16044;
    "TP-H-3062", 0.3559, 1.74364, 0.797951, 0, 0.787835, 1.37396, 0.787835, 1.16941, 2.52188;
    "ПХА-3М", 0.451744, 2.2132, 1.01284, 1.2693, 0, 1.74396, 1, 1.48434, 3.20102;
    "ПХА-4М", 0.259033, 1.26907, 0.580769, 0.727825, 0.573407, 0, 0.573407, 0.851129, 1.83548;
    "ПХА-5М", 0.451744, 2.2132, 1.01284, 1.2693, 1, 1.74396, 0, 1.48434, 3.20102;
    "ПХК-1М", 0.304341, 1.49104, 0.682352, 0.85513, 0.673701, 1.17491, 0.673701, 0, 2.15653;
    "ПХН-2М", 0.141125, 0.691406, 0.316412, 0.39653, 0.312401, 0.544815, 0.312401, 0.463708, 0
]
m_1 = [
    0 kg/s, "ARCADENE", "ARCIT-373D", "RD-2435", "TP-H-3062", "ПХА-3М", "ПХА-4М", "ПХА-5М", "ПХК-1М", "ПХН-2М";
    "ARCADENE", 0 kg/s, 0 kg/s, 0 kg/s, 0 kg/s, 0 kg/s, 0 kg/s, 0 kg/s, 0 kg/s, 0 kg/s;
    "ARCIT-373D", 7.46661 kg/s, 0 kg/s, 7.34217 kg/s, 0 kg/s, 7.21772 kg/s, 7.46661 kg/s, 6.34662 kg/s, 8.46216 kg/s, 0 kg/s;
    "RD-2435", 0 kg/s, 0 kg/s, 0 kg/s, 0 kg/s, 0 kg/s, 0 kg/s, 0 kg/s, 0 kg/s, 0 kg/s;
    "TP-H-3062", 4.2822 kg/s, 0 kg/s, 4.21083 kg/s, 0 kg/s, 4.13946 kg/s, 0 kg/s, 3.63987 kg/s, 0 kg/s, 0 kg/s;
    "ПХА-3М", 0 kg/s, 0 kg/s, 0 kg/s, 0 kg/s, 0 kg/s, 0 kg/s, 0 kg/s, 0 kg/s, 0 kg/s;
    "ПХА-4М", 5.88355 kg/s, 0 kg/s, 5.78549 kg/s, 0 kg/s, 5.68743 kg/s, 0 kg/s, 5.00102 kg/s, 6.66802 kg/s, 0 kg/s;
    "ПХА-5М", 0 kg/s, 0 kg/s, 0 kg/s, 0 kg/s, 0 kg/s, 0 kg/s, 0 kg/s, 0 kg/s, 0 kg/s;
    "ПХК-1М", 0 kg/s, 0 kg/s, 4.9242 kg/s, 0 kg/s, 0 kg/s, 0 kg/s, 0 kg/s, 0 kg/s, 0 kg/s;
    "ПХН-2М", 10.7992 kg/s, 10.6192 kg/s, 10.6192 kg/s, 10.9192 kg/s, 10.4392 kg/s, 10.7992 kg/s, 9.17929 kg/s, 12.2391 kg/s, 0 kg/s
]
m_2 = [
    0 kg/s, "ARCADENE", "ARCIT-373D", "RD-2435", "TP-H-3062", "ПХА-3М", "ПХА-4М", "ПХА-5М", "ПХК-1М", "ПХН-2М";
    "ARCADENE", 0 kg/s, 0 kg/s, 0 kg/s, 0 kg/s, 0 kg/s, 0 kg/s, 0 kg/s, 0 kg/s, 0 kg/s;
    "ARCIT-373D", 0.0117663 kg/s, 0 kg/s, 0.0117663 kg/s, 0 kg/s, 0.0117663 kg/s, 0.0117663 kg/s, 0.0117663 kg/s, 0.0117663 kg/s, 0 kg/s;
    "RD-2435", 0 kg/s, 0 kg/s, 0 kg/s, 0 kg/s, 0 kg/s, 0 kg/s, 0 kg/s, 0 kg/s, 0 kg/s;
    "TP-H-3062", 0.00693875 kg/s, 0 kg/s, 0.00693875 kg/s, 0 kg/s, 0.00693875 kg/s, 0 kg/s, 0.00693875 kg/s, 0 kg/s, 0 kg/s;
    "ПХА-3М", 0 kg/s, 0 kg/s, 0 kg/s, 0 kg/s, 0 kg/s, 0 kg/s, 0 kg/s, 0 kg/s, 0 kg/s;
    "ПХА-4М", 0.00942877 kg/s, 0 kg/s, 0.00942877 kg/s, 0 kg/s, 0.00942877 kg/s, 0 kg/s, 0.00942877 kg/s, 0.00942877 kg/s, 0 kg/s;
    "ПХА-5М", 0 kg/s, 0 kg/s, 0 kg/s, 0 kg/s, 0 kg/s, 0 kg/s, 0 kg/s, 0 kg/s, 0 kg/s;
    "ПХК-1М", 0 kg/s, 0 kg/s, 0.00909511 kg/s, 0 kg/s, 0 kg/s, 0 kg/s, 0 kg/s, 0 kg/s, 0 kg/s;
    "ПХН-2М", 0.0233636 kg/s, 0.0233636 kg/s, 0.0233636 kg/s, 0.0233636 kg/s, 0.0233636 kg/s, 0.0233636 kg/s, 0.0233636 kg/s, 0.0233636 kg/s, 0 kg/s
]
m_sum = [
    0 kg/s, "ARCADENE", "ARCIT-373D", "RD-2435", "TP-H-3062", "ПХА-3М", "ПХА-4М", "ПХА-5М", "ПХК-1М", "ПХН-2М";
    "ARCADENE", 0 kg/s, 0 kg/s, 0 kg/s, 0 kg/s, 0 kg/s, 0 kg/s, 0 kg/s, 0 kg/s, 0 kg/s;
    "ARCIT-373D", 7.47838 kg/s, 0 kg/s, 7.35393 kg/s, 0 kg/s, 7.22949 kg/s, 7.47838 kg/s, 6.35839 kg/s, 8.47393 kg/s, 0 kg/s;
    "RD-2435", 0 kg/s, 0 kg/s, 0 kg/s, 0 kg/s, 0 kg/s, 0 kg/s, 0 kg/s, 0 kg/s, 0 kg/s;
    "TP-H-3062", 4.28914 kg/s, 0 kg/s, 4.21777 kg/s, 0 kg/s, 4.1464 kg/s, 0 kg/s, 3.64681 kg/s, 0 kg/s, 0 kg/s;
    "ПХА-3М", 0 kg/s, 0 kg/s, 0 kg/s, 0 kg/s, 0 kg/s, 0 kg/s, 0 kg/s, 0 kg/s, 0 kg/s;
    "ПХА-4М", 5.89298 kg/s, 0 kg/s, 5.79492 kg/s, 0 kg/s, 5.69686 kg/s, 0 kg/s, 5.01045 kg/s, 6.67745 kg/s, 0 kg/s;
    "ПХА-5М", 0 kg/s, 0 kg/s, 0 kg/s, 0 kg/s, 0 kg/s, 0 kg/s, 0 kg/s, 0 kg/s, 0 kg/s;
    "ПХК-1М", 0 kg/s, 0 kg/s, 4.93329 kg/s, 0 kg/s, 0 kg/s, 0 kg/s, 0 kg/s, 0 kg/s, 0 kg/s;
    "ПХН-2М", 10.8225 kg/s, 10.6425 kg/s, 10.6425 kg/s, 10.9425 kg/s, 10.4626 kg/s, 10.8225 kg/s, 9.20266 kg/s, 12.2624 kg/s, 0 kg/s
]
arcsin2 = [
    0, "ARCADENE", "ARCIT-373D", "RD-2435", "TP-H-3062", "ПХА-3М", "ПХА-4М", "ПХА-5М", "ПХК-1М", "ПХН-2М";
    "ARCADENE", 0, 0, 0, 0, 0, 0, 0, 0, 0;
    "ARCIT-373D", 11.7776, 0, 27.2346, 0, 26.8614, 51.9973, 26.8614, 42.1191, 0;
    "RD-2435", 0, 0, 0, 0, 0, 0, 0, 0, 0;
    "TP-H-3062", 20.8486, 0, 52.9349, 0, 51.9837, 0, 51.9837, 0, 0;
    "ПХА-3М", 0, 0, 0, 0, 0, 0, 0, 0, 0;
    "ПХА-4М", 15.0127, 0, 35.5047, 0, 34.9881, 0, 34.9881, 58.3347, 0;
    "ПХА-5М", 0, 0, 0, 0, 0, 0, 0, 0, 0;
    "ПХК-1М", 0, 0, 43.0277, 0, 0, 0, 0, 0, 0;
    "ПХН-2М", 8.11296, 43.7415, 18.4461, 23.3614, 18.204, 33.012, 18.204, 27.6266, 0
]
l = [
    0 m, "ARCADENE", "ARCIT-373D", "RD-2435", "TP-H-3062", "ПХА-3М", "ПХА-4М", "ПХА-5М", "ПХК-1М", "ПХН-2М";
    "ARCADENE", 0 m, 0 m, 0 m, 0 m, 0 m, 0 m, 0 m, 0 m, 0 m;
    "ARCIT-373D", 1.17582 m, 0 m, 0.524435 m, 0 m, 0.531169 m, 0.304576 m, 0.531169 m, 0.357849 m, 0 m;
    "RD-2435", 0 m, 0 m, 0 m, 0 m, 0 m, 0 m, 0 m, 0 m, 0 m;
    "TP-H-3062", 0.674347 m, 0 m, 0.30077 m, 0 m, 0.304632 m, 0 m, 0.304632 m, 0 m, 0 m;
    "ПХА-3М", 0 m, 0 m, 0 m, 0 m, 0 m, 0 m, 0 m, 0 m, 0 m;
    "ПХА-4М", 0.926522 m, 0 m, 0.413245 m, 0 m, 0.418551 m, 0 m, 0.418551 m, 0.281978 m, 0 m;
    "ПХА-5М", 0 m, 0 m, 0 m, 0 m, 0 m, 0 m, 0 m, 0 m, 0 m;
    "ПХК-1М", 0 m, 0 m, 0.351725 m, 0 m, 0 m, 0 m, 0 m, 0 m, 0 m;
    "ПХН-2М", 1.70062 m, 0.347119 m, 0.758505 m, 0.60525 m, 0.768244 m, 0.440516 m, 0.768244 m, 0.517567 m, 0 m
]
# Ведущий - ПХН-2М - 2
# Ведомый - ПХА-4М - 1
ρ_1 := File[5, 6]*kg/m^3 = 1800 kg/m^3
ρ_2 := File[5, 9]*kg/m^3 = 2430 kg/m^3
u_11 := File[6, 6]*mm/s = 6.49 mm/s
u_12 := File[6, 9]*mm/s = 14.5 mm/s
v_1 := File[7, 6] = 0.24
v_2 := File[7, 9] = 0.19
m_1 := ρ_1*u_12*(p_к/(98066.5 Pa))^v_2*π/4*(D^2 - d^2) = 10.7992 kg/s
m_2 := ρ_2*u_12*(p_к/(98066.5 Pa))^v_2*π/4*d^2 = 0.0233636 kg/s
m_sum := m_1 + m_2 = 10.8225 kg/s
arcsin2 := asin(u_11/u_12*(p_к/(98066.5 Pa))^(v_1 - v_2)) = 33.012 deg
g_1 := m_1/m_sum = 0.997841
g_2 := m_2/m_sum = 0.00215879
