p := [3; 5; 7] MPa
# ПХА-3М
U := (3.44 mm/s)*(p/(98066.5 Pa))^0.26 = [8.37172; 9.56082; 10.4349] mm/s
# CYN
U := (6.49 mm/s)*(p/(98066.5 Pa))^0.24 = [14.7499; 16.6737; 18.076] mm/s
# ПХА-4М
U := (6.49 mm/s)*(p/(98066.5 Pa))^0.24 = [14.7499; 16.6737; 18.076] mm/s
# ARCADENE
U := (1.554 mm/s)*(p/(98066.5 Pa))^0.26 = [3.78187; 4.31905; 4.71391] mm/s
# AGC
U := (1.93 mm/s)*(p/(98066.5 Pa))^0.35 = [6.39025; 7.64125; 8.59626] mm/s
# ПХА-5М
U := (3.44 mm/s)*(p/(98066.5 Pa))^0.26 = [8.37172; 9.56082; 10.4349] mm/s
# RD 2435
U := (0.635 mm/s)*(p/(98066.5 Pa))^0.693 = [6.79665; 9.68358; 12.2265] mm/s
# H
U := (0.7 mm/s)*(p/(98066.5 Pa))^0.6 = [5.45078; 7.40573; 9.06243] mm/s
# ПХК-1М
U := (4.72 mm/s)*(p/(98066.5 Pa))^0.28 = [12.3001; 14.1915; 15.5935] mm/s
# ПХН-2М
U := (14.5 mm/s)*(p/(98066.5 Pa))^0.19 = [27.7736; 30.6044; 32.6248] mm/s
