# Заднее днище с сопловым блоком
Ry := 0.162 m
k_з := 1.25
p_k := 5 MPa
σ_в := 490 MPa
z := 50
k_н := 1.1
X := 0.25
d_1 := sqrt(4*k_з*Ry^2*p_k*(z + k_н*(1 - X))/(σ_в*z^2)) = 5.21742 mm
d_0 := 8 mm
d_1 := 6.466 mm
F_p := π*Ry^2*p_k/z = 8244.8 N
F_зат := F_p*k_н*(1 - X)/z = 136.039 N
N := F_p + F_зат = 8380.83 N
σ := 4*N/(π*d_1^2) = 255.227 MPa
k_зд := σ_в/σ = 1.91986
# Сопловой фланец с воспламенителем
Ry := □ m  # error: Отсутствует элемент или выражение.
k_з := 1.25
p_k := 5 MPa
σ_в := 490 MPa
z := 10
k_н := 1.1
X := 0.25
d_1 := sqrt(4*k_з*Ry^2*p_k*(z + k_н*(1 - X))/(σ_в*z^2)) = 12.0393 mm
d_0 := 6 mm
d_1 := 4.773 mm
F_p := π*Ry^2*p_k/z = 41224 N
F_зат := F_p*k_н*(1 - X)/z = 3400.98 N
N := F_p + F_зат = 44625 N
σ := 4*N/(π*d_1^2) = 2494.05 MPa
k_зд := σ_в/σ = 0.196468
# Фланец воспламенителя на смятие
Ry := □ m  # error: Отсутствует элемент или выражение.
l := □ m  # error: Отсутствует элемент или выражение.
D_кс := □ m  # error: Отсутствует элемент или выражение.
h := □ m  # error: Отсутствует элемент или выражение.
σ_изг := 6*Ry^2*p_k*l/(D_кс*h^2)  # error: Эта переменная не определена. Проверьте правильность установки обозначения.
k_зд := 1180 MPa/σ_изг  # error: Эта переменная не определена. Проверьте правильность установки обозначения.
