τ_р := 0.015 s  # - Время работы воспламенителя = время выхода на режим
W_св := 0.0083 m^3
File := READEXCEL("..\1. Выбор заряда\Расчеты в Терре для всех топлив\1. Топлива.xlsx", "Sheet1!A1:U9")
# [Excel component]
    excel["A1"] := File
# Исходные данные: | Ведомый - ПХА-4М - 1 | Ведущий - ПХН-2М - 2
p_k := 5 MPa
p_h := 0 MPa
ρ_1 := File[5, 6]*kg/m^3 = 1800 kg/m^3
ρ_2 := File[5, 9]*kg/m^3 = 2430 kg/m^3
J_P := 1500 kN*s
p_a := 0.03 MPa
u_11 := File[6, 6]*mm/s = 6.49 mm/s
u_12 := File[6, 9]*mm/s = 14.5 mm/s
v_1 := File[7, 6] = 0.24
v_2 := File[7, 9] = 0.19
D := 0.5 m
d := 0.02 m = 20 mm
F_г := π/4*(D^2 - d^2)/(u_11/u_12*(p_k/(98066.5 Pa))^(v_1 - v_2)) = 0.35982 m^2
# Состав Б:
C_p := 977 J/(kg*K)
# - Удельные теплоемкости
C_v := 905 J/(kg*K)
λ := 0.2 W/(m*K)  # - Коэффициент теплопроводности
η := 0.0001 N*s/m^2  # - Коэффициент динамической вязкости
I_к := -3.14*10^6 J/kg  # - Полная энтальпия
z_в := 0.562  # - Относительная массовая концентрация конденсированной фазы
u_1в := 0.011 m/s
ν_в := 0.37
ρ_в := 1750 kg/m^3
R_в := C_p - C_v = 72 J/(kg*K)
T_в := 3676 K
p_в := 2.1 MPa
k := 1.17
# Расчет:
τ_рНК := 1.5*τ_р explicit, ALL → 1.5*0.015*s = 0.0225 s
τ_рВ := 2*τ_рНК = 0.045 s
ρ_ПС := p_в/(R_в*T_в) = 7.93435 kg/m^3
M1_в := W_св*ρ_ПС = 65.8551 gm
M2_в := 180*gm/m^2*F_г = 64.7676 gm
M2_в := 190*gm/m^2*F_г = 68.3658 gm
M2_в := 200*gm/m^2*F_г = 71.964 gm
M_в := 65 gm = 0.065 kg
m_в := M_в/τ_рВ = 1.44444 kg/s
p_крВmin := 2.1 MPa
p_кmin := p_крВmin/(2/(k + 1))^(k/(k - 1)) = 3.68179 MPa
p_кВ := 3.7 MPa = 3.7 MPa
u_в := u_1в*(p_кВ/(98066.5*Pa))^ν_в explicit, ALL → 0.011*m/s*(3.7*MPa/(98066.5*Pa))^0.37 = 42.1468 mm/s
e_в := u_в*τ_рВ = 1.89661 mm
F_gВ := m_в/(ρ_в*u_в) explicit, ALL → 1.44444444444*kg/s/(1750*kg/m^3*42.1468064768*mm/s) = 19583.9 mm^2
d_внВ := 15 mm
d_нВ := 4*e_в + d_внВ = 22.5864 mm
L_в := F_gВ/(π*(d_нВ + d_внВ)) = 165.851 mm
χ_вн := 4*L_в/d_внВ = 44.2268
d_внК := 28 mm
χ_нар := 4*L_в*d_нВ/(d_внК^2 - d_нВ^2) = 54.715
T_кВ := T_в/(p_в/p_кВ)^((k - 1)/k) explicit, ALL → 3676*K/(2.1*MPa/(3.7*MPa))^((1.17 - 1)/1.17) = 3991.32 K
A_kВ := sqrt(k)*(2/(k + 1))^((k + 1)/(2*(k - 1))) = 0.64264
φ_св := 0.55
F_крВ := m_в*sqrt(T_кВ*R_в)/(p_кВ*A_kВ*φ_св) = 0.000592097 m^2
N := 4
d_кр := sqrt(4*F_крВ/(π*N)) = 13.7285 mm
# Расчет толщины бронирующего покрытия основного воспламенителя:
# АЦ-2
λ_БП := 0.296 W/(m*K)
C_БП := 1630 J/(kg*K)
ρ_БП := 1270 kg/m^3
T_T := 293 K
T_доп := 500 K
δ_БП := sqrt(2*λ_БП*τ_рВ/(C_БП*ρ_БП*ln((T_кВ - T_T)/(T_кВ - T_доп)))) = 0.472677 mm
# Расчет толщины теплозащитного покрытия:
ρ_П := 1300 kg/m^3
T_дТЗП := 2500 K
I_П := -4*10^6 J/kg
C_pП := 2600 J/(kg*K)
φ := 0.6
Q_П := 3*10^6 J/kg
T_w := 2500 K
a_П := 1.5*10^-7 m^2/s
Pr := η*C_p/λ = 0.4885
r := nthroot(Pr, 3) = 0.787568
T_r := T_кВ = 3991.32 K
H_w/H_r == T_w/T_r
T_w/T_r = 0.626359
ρ_w := p_кВ/(R_в*T_w) = 20.5556 kg/m^3
w := 100 m/s
δ := 28 mm
Re_ws := ρ_w*w*δ/η = 575556
St_w := 0.0296*Re_ws^-0.2*Pr^-0.6*(T_w/T_r)^0.39 = 0.00267126
α := ρ_w*C_p*w*St_w = 5364.64 W/(m^2*K)
q_k := α*(T_r - T_w) = 8.00039 MW/m^2
q_p := 0.5*q_k = 4.0002 MW/m^2
q_sum := q_k + q_p = 12.0006 MW/m^2
U_П := q_sum/(ρ_П*(Q_П + φ*(I_к - I_П) + C_pП*(T_w - T_T))) = 0.000997517 m/s
δ_ТЗП := a_П/U_П*ln((T_w - T_T)/(T_доп - T_T)) + U_П*τ_рВ = 0.400773 mm
δ_ТЗП := 1 mm
# Расчет толщины стенки корпуса воспламенителя
σ_В := 1000 MPa
d_внК = 0.028 m
k_з := 1.5
d_кНАР := d_внК + 2*δ_ТЗП = 30 mm
δ := p_кВ*d_кНАР*k_з/(2*σ_В) = 0.08325 mm
δ := 1.5 mm
# Расчет предвоспламенителя
z_прВ := 0.4
R_прВ := 250 J/(kg*K)
T_прВ := 2567 K
p_прВ := 0.35*p_кВ = 1.295 MPa
ρ_прВ := p_прВ/(R_прВ*T_прВ) = 2.01792 kg/m^3
W_свВ := 0.3*10^-4 m^3
M_прВ := W_свВ*ρ_прВ = 0.0605376 gm
M_прВ := 1 gm
ρ_пр := 1000 kg/m^3
V_пр := M_прВ/ρ_пр = 1000 mm^3
