# Исходные данные:
File := READEXCEL("..\1. Выбор заряда\Расчеты в Терре для всех топлив\1. Топлива.xlsx", "Sheet1!A1:U9")
# [Excel component]
    excel["A1"] := File
kJ := 1000*J
# Ведомый - ПХА-4М - 1 | Ведущий - ПХН-2М - 2
ρ_1 := File[5, 6]*kg/m^3 = 1800 kg/m^3
ρ_2 := File[5, 9]*kg/m^3 = 2430 kg/m^3
u_11 := File[6, 6]*mm/s = 6.49 mm/s
u_12 := File[6, 9]*mm/s = 14.5 mm/s
v_1 := File[7, 6] = 0.24
v_2 := File[7, 9] = 0.19
# Расчет по паре ПХА-4М - ПХН-2М:
Para := READEXCEL("..\1. Выбор заряда\Пара.xlsx", "Sheet1!A1:FM4")
# [Excel component]
    excel["A1"] := Para
R := Para[1, 15] J/(K*kg) = 376.087 J/(K*kg)
p_tor := 5 MPa
T_tor := Para[1, 1] K = 3906.2 K
R_kr := 36.8 mm = 0.0368 m
k := Para[1, 10] = 1.18683
ρ_0 := p_tor/(R*T_tor) explicit, ALL → 5*MPa/(376.087*J/(kg*K)*3906.2*K) = 3.40351 kg/m^3
J_у := Para[3, 33] m/s = 2938.36 m/s
x := [0; 11.045; 22.090; 25.755; 29.420; 33.110; 36.800; 40.490; 44.180; 51.560; 58.915; 66.270; 88.360; 110.450; 132.540; 154.630; 176.720; 198.810; 220.900; 242.990; 265.080; 287.170; 309.260; 331.350; 353.440; 375.530; 397.620; 419.710; 441.800]*mm
x_otn := x/R_kr = [0; 0.300136; 0.600272; 0.699864; 0.799457; 0.899728; 1; 1.10027; 1.20054; 1.40109; 1.60095; 1.80082; 2.40109; 3.00136; 3.60163; 4.2019; 4.80217; 5.40245; 6.00272; 6.60299; 7.20326; 7.80353; 8.4038; 9.00408; 9.60435; 10.2046; 10.8049; 11.4052; 12.0054]
y := [55.200; 42.057; 38.334; 37.648; 37.174; 36.893; 36.800; 39.353; 41.773; 46.271; 50.378; 54.186; 64.457; 73.693; 82.059; 89.678; 96.722; 103.303; 109.483; 115.312; 120.830; 126.076; 131.081; 135.876; 140.487; 144.914; 149.149; 153.181; 157]*mm
y_otn := y/R_kr = [1.5; 1.14285; 1.04168; 1.02304; 1.01016; 1.00253; 1; 1.06937; 1.13514; 1.25736; 1.36897; 1.47245; 1.75155; 2.00253; 2.22986; 2.4369; 2.62832; 2.80715; 2.97508; 3.13348; 3.28342; 3.42598; 3.56198; 3.69228; 3.81758; 3.93788; 4.05296; 4.16253; 4.2663]
s_дзв := [0; 18.066; 29.749; 33.478; 37.174; 40.875; 44.567]*mm
s_свзв1 := [4.487; 8.900; 17.544; 25.968; 34.250; 58.614; 82.558; 106.180; 129.548; 152.734; 175.784; 198.723; 221.569; 244.338; 267.042; 289.693; 312.297; 334.863; 357.392; 379.885; 402.340; 424.758]*mm
s_свзв :=
    for i ∈ 0 .. last(s_свзв1)
        s_свзв[i] ← s_свзв1[i] + s_дзв[last(s_дзв)]
    s_свзв
s0 := stack(s_дзв, s_свзв)
s :=
    for i ∈ 0 .. last(y_otn)
        s[i] ← s0[i] + R_kr
    s  # В методе Александренокова написано, что надо шагнуть влево на радиус критики
s = [36.8; 54.866; 66.549; 70.278; 73.974; 77.675; 81.367; 85.854; 90.267; 98.911; 107.335; 115.617; 139.981; 163.925; 187.547; 210.915; 234.101; 257.151; 280.09; 302.936; 325.705; 348.409; 371.06; 393.664; 416.23; 438.759; 461.252; 483.707; 506.125] mm
# [Excel component]
    excel["A1:A23"] := x*1000
    excel["B1:B23"] := x_otn
    excel["D1:D23"] := y*1000
    excel["E1:E23"] := y_otn
    excel["G1:G23"] := s*1000
q1 := 1/y_otn^2 = [0.444444; 0.76563; 0.921568; 0.955458; 0.97998; 0.994965; 1; 0.87446; 0.776076; 0.632525; 0.533598; 0.461234; 0.325953; 0.249369; 0.201114; 0.168393; 0.144759; 0.126902; 0.11298; 0.101847; 0.0927569; 0.0851983; 0.0788163; 0.0733517; 0.0686157; 0.0644874; 0.0608772; 0.0577146; 0.054941]
y_otn^2 = [2.25; 1.30611; 1.08511; 1.04662; 1.02043; 1.00506; 1; 1.14356; 1.28853; 1.58096; 1.87407; 2.1681; 3.06792; 4.01012; 4.97229; 5.93849; 6.90804; 7.88007; 8.85111; 9.81869; 10.7809; 11.7373; 12.6877; 13.633; 14.5739; 15.5069; 16.4265; 17.3266; 18.2014]
q(λ, k) := λ*(1 - λ^2*((k - 1)/(k + 1)))^(1/(k - 1))*((k + 1)/2)^(1/(k - 1))
solve block
    # guess values
    λ := 0.2
    # constraints
    q(λ, k) == 1/y_otn^2
    # solver
    λ1_solver(y_otn) := find(λ)
end solve block
λ1 :=
    for i ∈ 0 .. 6
        la1[i] ← λ1_solver(y_otn[i])
    la1
solve block
    # guess values
    λ := 2
    # constraints
    q(λ, k) == 1/y_otn^2
    # solver
    λ2_solver(y_otn) := find(λ)
end solve block
λ2 :=
    for i ∈ 7 .. last(y_otn)
        la2[i - 7] ← λ2_solver(y_otn[i])
    la2
λ := stack(λ1, λ2)
λ1 = [0.286112; 0.544611; 0.736712; 0.801138; 0.866203; 0.932569; 1]
λ2 = [1.35869; 1.49451; 1.66439; 1.77591; 1.85847; 2.02334; 2.12934; 2.20481; 2.26186; 2.30723; 2.34457; 2.37601; 2.40297; 2.42642; 2.44709; 2.4655; 2.48206; 2.4971; 2.51079; 2.52326; 2.5346; 2.54491]
λ = [0.286112; 0.544611; 0.736712; 0.801138; 0.866203; 0.932569; 1; 1.35869; 1.49451; 1.66439; 1.77591; 1.85847; 2.02334; 2.12934; 2.20481; 2.26186; 2.30723; 2.34457; 2.37601; 2.40297; 2.42642; 2.44709; 2.4655; 2.48206; 2.4971; 2.51079; 2.52326; 2.5346; 2.54491]
pi(λ, k) :=
    for i ∈ 0 .. last(y_otn)
        pi[i] ← (1 - λ[i]^2*((k - 1)/(k + 1)))^(k/(k - 1))
    pi
τ(λ, k) :=
    for i ∈ 0 .. last(y_otn)
        τ[i] ← (1 - λ[i]^2*((k - 1)/(k + 1)))
    τ
ε(λ, k) :=
    for i ∈ 0 .. last(y_otn)
        ε[i] ← (1 - λ[i]^2*((k - 1)/(k + 1)))^(1/(k - 1))
    ε
λ = [0.286112; 0.544611; 0.736712; 0.801138; 0.866203; 0.932569; 1; 1.35869; 1.49451; 1.66439; 1.77591; 1.85847; 2.02334; 2.12934; 2.20481; 2.26186; 2.30723; 2.34457; 2.37601; 2.40297; 2.42642; 2.44709; 2.4655; 2.48206; 2.4971; 2.51079; 2.52326; 2.5346; 2.54491]
pi(λ, k) = [0.956396; 0.849553; 0.739631; 0.698904; 0.656494; 0.612352; 0.567048; 0.336113; 0.260529; 0.179863; 0.136097; 0.10847; 0.0649482; 0.044484; 0.0330676; 0.025984; 0.021209; 0.0177987; 0.0152625; 0.0133149; 0.01178; 0.010543; 0.00952723; 0.00867918; 0.00796091; 0.00734786; 0.00682203; 0.00636948; 0.00597899]
τ(λ, k) = [0.993006; 0.97466; 0.953631; 0.945166; 0.935898; 0.925699; 0.914566; 0.842286; 0.809179; 0.763332; 0.730551; 0.704919; 0.650242; 0.612634; 0.58469; 0.562917; 0.545208; 0.530368; 0.517687; 0.506681; 0.497005; 0.4884; 0.480674; 0.473671; 0.467273; 0.461416; 0.456054; 0.451153; 0.446682]
ε(λ, k) = [0.963132; 0.87164; 0.775594; 0.739451; 0.701458; 0.661502; 0.620019; 0.399048; 0.321967; 0.235629; 0.186293; 0.153876; 0.0998832; 0.0726111; 0.0565558; 0.0461596; 0.0389009; 0.0335592; 0.0294821; 0.0262787; 0.023702; 0.0215867; 0.0198206; 0.0183232; 0.0170369; 0.0159246; 0.0149588; 0.0141182; 0.0133853]
p :=
    for i ∈ 0 .. last(y_otn)
        p[i] ← pi(λ, k)[i]*p_tor
    p
T :=
    for i ∈ 0 .. last(y_otn)
        T[i] ← τ(λ, k)[i]*T_tor
    T
ρ :=
    for i ∈ 0 .. last(y_otn)
        ρ[i] ← ε(λ, k)[i]*ρ_0
    ρ
ρ = [3.27803; 2.96664; 2.63974; 2.51673; 2.38742; 2.25143; 2.11024; 1.35816; 1.09582; 0.801966; 0.63405; 0.523719; 0.339953; 0.247133; 0.192488; 0.157105; 0.132399; 0.114219; 0.100343; 0.0894397; 0.08067; 0.0734706; 0.0674596; 0.0623633; 0.0579854; 0.0541996; 0.0509125; 0.0480516; 0.0455571] kg/m^3
p = [4.78198; 4.24776; 3.69815; 3.49452; 3.28247; 3.06176; 2.83524; 1.68056; 1.30264; 0.899316; 0.680483; 0.542351; 0.324741; 0.22242; 0.165338; 0.12992; 0.106045; 0.0889936; 0.0763126; 0.0665744; 0.0589001; 0.0527148; 0.0476362; 0.0433959; 0.0398045; 0.0367393; 0.0341101; 0.0318474; 0.0298949] MPa
T = [3878.88; 3807.22; 3725.07; 3692.01; 3655.8; 3615.97; 3572.48; 3290.14; 3160.81; 2981.73; 2853.68; 2753.55; 2539.98; 2393.07; 2283.91; 2198.87; 2129.69; 2071.72; 2022.19; 1979.2; 1941.4; 1907.79; 1877.61; 1850.25; 1825.26; 1802.38; 1781.44; 1762.29; 1744.83] K
# [plot: p (MPa) vs x]
# [plot: T vs x]
a_cr := sqrt(2*k/(k + 1)*R*T_tor) explicit, ALL → sqrt(2*1.18683/(1.18683 + 1)*376.087*J/(kg*K)*3906.2*K) = 1262.77 m/s
U := a_cr*λ
a := sqrt(k*R*T)
M := U/a
U = [361.293; 687.717; 930.295; 1011.65; 1093.81; 1177.62; 1262.77; 1715.7; 1887.21; 2101.73; 2242.57; 2346.81; 2555; 2688.86; 2784.16; 2856.21; 2913.49; 2960.64; 3000.35; 3034.39; 3064; 3090.1; 3113.35; 3134.27; 3153.26; 3170.55; 3186.29; 3200.61; 3213.62] m/s
a = [1315.81; 1303.59; 1289.45; 1283.72; 1277.41; 1270.43; 1262.77; 1211.84; 1187.79; 1153.65; 1128.6; 1108.63; 1064.76; 1033.51; 1009.67; 990.69; 974.982; 961.622; 950.057; 939.903; 930.885; 922.792; 915.463; 908.77; 902.612; 896.937; 891.71; 886.906; 882.5] m/s
M = [0.274579; 0.527555; 0.721464; 0.788063; 0.856275; 0.926944; 1; 1.41578; 1.58885; 1.82182; 1.98703; 2.11686; 2.39959; 2.60167; 2.7575; 2.88305; 2.98825; 3.0788; 3.15807; 3.22841; 3.29149; 3.34864; 3.40084; 3.44891; 3.49348; 3.53486; 3.57324; 3.60874; 3.6415]
# [Excel component]
    excel["A2"] := y_otn^2
    excel["D2"] := M
    excel["G2"] := ρ
    excel["B2"] := q1
    excel["E2"] := T
    excel["H2"] := a
    excel["C2"] := λ
    excel["F2"] := p/10^6
    excel["I2"] := U
# [plot: M vs x]
# [plot: U vs x]
Avduevskiy := READEXCEL(".\Расчет для Авдуевского 1000-4000-200.xlsx", "Расчет для Авдуевского 1000-400!A1:FR23")
# [Excel component]
    excel["A1"] := Avduevskiy
T_terra :=
    for i ∈ 0 .. 15
        T_terra[i] ← Avduevskiy[i + 2, 1]*K
    T_terra
Pr_terra_z :=
    for i ∈ 0 .. 15
        Pr_terra_z[i] ← Avduevskiy[i + 2, 23]
    Pr_terra_z  # Индекс z - замороженное
Cp_terra_z :=
    for i ∈ 0 .. 15
        Cp_terra_z[i] ← Avduevskiy[i + 2, 7]*kJ/(kg*K)
    Cp_terra_z
T_terra = [1000; 1200; 1400; 1600; 1800; 2000; 2200; 2400; 2600; 2800; 3000; 3200; 3400; 3600; 3800; 4000] K
Pr_terra_z = [0.602141; 0.598488; 0.60846; 0.61591; 0.621106; 0.624758; 0.627314; 0.628959; 0.629645; 0.629003; 0.626257; 0.620268; 0.610092; 0.595562; 0.577314; 0.556535]
Cp_terra_z = [1.42424; 1.47428; 1.52086; 1.56323; 1.60074; 1.63457; 1.66564; 1.7553; 1.76946; 1.78206; 1.79312; 1.80251; 1.8101; 1.81559; 1.81786; 1.81331] kJ/(kg*K)
μ_terra :=
    for i ∈ 0 .. 15
        μ_terra[i] ← Avduevskiy[i + 2, 20]*Pa*s
    μ_terra
z_k_terra :=
    for i ∈ 0 .. 15
        z_k_terra[i] ← Avduevskiy[i + 2, 26]
    z_k_terra
Lt_terra_z :=
    for i ∈ 0 .. 15
        Lt_terra_z[i] ← Avduevskiy[i + 2, 21]*W/(m*K)
    Lt_terra_z
μ_terra = [3.84e-5; 4.45e-5; 5.01e-5; 5.54e-5; 6.05e-5; 6.54e-5; 7.01e-5; 7.46e-5; 7.9e-5; 8.32e-5; 8.73e-5; 9.12e-5; 9.5e-5; 9.85e-5; 0.0001018; 0.0001048] kg/(m*s)
z_k_terra = [0.398418; 0.398418; 0.398417; 0.398413; 0.398397; 0.398352; 0.398245; 0.398065; 0.397851; 0.39755; 0.397095; 0.39631; 0.39472; 0.391133; 0.382777; 0.363385]
Lt_terra_z = [0.0994302; 0.120568; 0.138139; 0.15537; 0.17219; 0.188626; 0.204717; 0.220519; 0.23614; 0.251773; 0.267786; 0.28476; 0.303286; 0.32354; 0.344775; 0.364513] W/(m*K)
Lt_terra :=
    for i ∈ 0 .. 15
        Lt_terra[i] ← Avduevskiy[i + 2, 22]*W/(m*K)
    Lt_terra
Pr_terra :=
    for i ∈ 0 .. 15
        Pr_terra[i] ← Avduevskiy[i + 2, 24]
    Pr_terra
Cp_terra :=
    for i ∈ 0 .. 15
        Cp_terra[i] ← Avduevskiy[i + 2, 9]*kJ/(kg*K)
    Cp_terra
Lt_terra = [0.215008; 0.120568; 0.138139; 0.15537; 0.17219; 0.188626; 0.204717; 0.23317; 0.283504; 0.373485; 0.521001; 0.765239; 1.0843; 1.48926; 1.94687; 2.44236] W/(m*K)
Pr_terra = [0.518473; 0.659536; 0.63631; 0.634395; 0.634754; 0.638033; 0.647944; 0.636027; 0.605408; 0.563685; 0.529204; 0.485774; 0.450901; 0.413195; 0.382504; 0.355464]
Cp_terra = [2.2324; 1.57386; 1.56711; 1.59456; 1.62457; 1.65883; 1.70453; 1.83496; 1.94757; 2.16467; 2.54861; 3.11696; 3.81518; 4.63435; 5.70991; 7.39638] kJ/(kg*K)
VS_Pr := lspline(T_terra, Pr_terra)
VS_Cp := lspline(T_terra, Cp_terra)
VS_μ := lspline(T_terra, μ_terra)
VS_z_k := lspline(T_terra, z_k_terra)
VS_Lt := lspline(T_terra, Lt_terra)
C_p := interp(VS_Cp, T_terra, Cp_terra, T)
μ := interp(VS_μ, T_terra, μ_terra, T)
Lt := interp(VS_Lt, T_terra, Lt_terra, T)
z_k := interp(VS_z_k, T_terra, z_k_terra, T)
Pr_interp := interp(VS_Pr, T_terra, Pr_terra, T)
Pr :=
    for i ∈ 0 .. last(y_otn)
        Pr[i] ← μ[i]*C_p[i]/Lt[i]
    Pr
# Тут считаю двумя способами и получаются разные значения.
# Но я дальше беру значения Pr, полученные по формуле
#
# Какие значения лучше брать?
Pr_interp = [0.371701; 0.381504; 0.393153; 0.3981; 0.403774; 0.410405; 0.418191; 0.469423; 0.493996; 0.532673; 0.554222; 0.572912; 0.616375; 0.636797; 0.645944; 0.647934; 0.645679; 0.642265; 0.639221; 0.637092; 0.635806; 0.635073; 0.634704; 0.634574; 0.634603; 0.634735; 0.634929; 0.635141; 0.63534]
Pr = [0.304249; 0.298893; 0.297975; 0.299217; 0.301487; 0.304917; 0.309522; 0.353193; 0.380841; 0.432459; 0.467763; 0.495509; 0.560052; 0.587685; 0.588709; 0.583602; 0.579962; 0.577592; 0.575863; 0.574499; 0.573402; 0.572538; 0.571874; 0.571382; 0.571037; 0.570819; 0.570706; 0.570657; 0.570638]
# [plot: Pr_interp vs x]
# [plot: Pr vs x]
r := nthroot(Pr, 3)
T_r :=
    for i ∈ 0 .. last(y_otn)
        T_r[i] ← T[i]*(1 + (k - 1)/2*r[i]*M[i]^2)
    T_r
T_w := 0.85*T_r
C_pr := interp(VS_Cp, T_terra, Cp_terra, T_r)
C_pw := interp(VS_Cp, T_terra, Cp_terra, T_w)
Lt_w := interp(VS_Lt, T_terra, Lt_terra, T_w)
μ_w := interp(VS_μ, T_terra, μ_terra, T_w)
Pr_w_interp := interp(VS_Pr, T_terra, Pr_terra, T_w)  # Тут опять два значения
Pr_w :=
    for i ∈ 0 .. last(y_otn)
        Pr_w[i] ← μ_w[i]*C_pw[i]/Lt_w[i]
    Pr_w
# [plot: Pr_w_interp vs x]
Pr_w_interp = [0.465662; 0.469044; 0.472998; 0.474591; 0.476327; 0.478223; 0.480272; 0.492706; 0.497267; 0.501123; 0.503065; 0.504037; 0.503946; 0.505031; 0.508297; 0.511742; 0.5145; 0.516713; 0.518553; 0.520122; 0.521478; 0.522657; 0.52369; 0.524601; 0.525408; 0.526125; 0.526761; 0.527329; 0.527838]
Pr_w = [0.349109; 0.352779; 0.357139; 0.358911; 0.36085; 0.362973; 0.365274; 0.379354; 0.384649; 0.389225; 0.391572; 0.392758; 0.392647; 0.393979; 0.398055; 0.402467; 0.406092; 0.409062; 0.411578; 0.413758; 0.415667; 0.417348; 0.418837; 0.420162; 0.421347; 0.422407; 0.423354; 0.424204; 0.424972]
# [plot: Pr_w vs x]
H_r :=
    for i ∈ 0 .. last(y_otn)
        H_r[i] ← C_pr[i]*T_r[i]
    H_r
H_w :=
    for i ∈ 0 .. last(y_otn)
        H_w[i] ← C_pw[i]*T_w[i]
    H_w
ρ_w :=
    for i ∈ 0 .. last(y_otn)
        ρ_w[i] ← p[i]/(R*T_w[i])
    ρ_w
Re_ws :=
    for i ∈ 0 .. last(y_otn)
        Re_ws[i] ← ρ_w[i]*U[i]*s[i]/μ_w[i]
    Re_ws
ε_t :=
    for i ∈ 0 .. last(y_otn)
        ε_t[i] ← (H_w[i]/H_r[i])^0.39
    ε_t
ε_M :=
    for i ∈ 0 .. last(y_otn)
        ε_M[i] ← (1 + (k - 1)/2*r[i]*M[i]^2)^0.11
    ε_M
ε_Mt :=
    for i ∈ 0 .. last(y_otn)
        ε_Mt[i] ← ε_M[i]*ε_t[i]
    ε_Mt
St_w :=
    for i ∈ 0 .. last(y_otn)
        St_w[i] ← 0.0326*Re_ws[i]^-0.2*Pr_w[i]^-0.6*ε_t[i]*ε_M[i]
    St_w
# Значение числа Стантона для реальных условий:
k_в := 0.9
k_ш := 1.095
k_т := 1
z := z_k/(1 - z_k)
k_р :=
    for i ∈ 0 .. last(y_otn)
        k_р[i] ← 1 + 0.0246*Re_ws[i]^-0.3*z[i]^2.45
    k_р
St_w_new :=
    for i ∈ 0 .. last(y_otn)
        St_w_new[i] ← St_w[i]*k_в*k_ш*k_т*k_р[i]
    St_w_new
α_w :=
    for i ∈ 0 .. last(y_otn)
        α_w[i] ← St_w_new[i]*ρ_w[i]*U[i]*C_pw[i]
    α_w
St_w_new = [0.0031765; 0.0026332; 0.00244374; 0.00240065; 0.00236493; 0.00233557; 0.00231226; 0.00235367; 0.00239315; 0.00247157; 0.00253901; 0.00259849; 0.00274934; 0.00285578; 0.00292225; 0.00296841; 0.00300634; 0.00303886; 0.00306688; 0.00309119; 0.00311244; 0.00313125; 0.00314809; 0.00316334; 0.0031773; 0.00319; 0.00320136; 0.00321126; 0.00321961]
St_w = [0.0032228; 0.00267165; 0.00247944; 0.00243573; 0.00239949; 0.0023697; 0.00234605; 0.00238805; 0.00242809; 0.00250764; 0.00257605; 0.00263639; 0.00278941; 0.00289738; 0.0029648; 0.00301162; 0.00305009; 0.00308308; 0.0031115; 0.00313615; 0.0031577; 0.00317679; 0.00319386; 0.00320933; 0.00322349; 0.00323637; 0.0032479; 0.00325794; 0.00326641]
αCpw :=
    for i ∈ 0 .. last(y_otn)
        αcpw[i] ← ρ_w[i]*U[i]*St_w_new[i]
    αcpw
q_к :=
    for i ∈ 0 .. last(y_otn)
        q_к[i] ← α_w[i]*(T_r[i] - T_w[i])
    q_к
# [Excel component]
    excel["A2"] := Pr
    excel["D2"] := C_pr
    excel["G2"] := C_pw
    excel["B2"] := r
    excel["E2"] := H_r/1000
    excel["H2"] := H_w/1000
    excel["C2"] := T_r
    excel["F2"] := T_w
# [Excel component]
    excel["A2"] := μ_w*10^4
    excel["C2"] := Re_ws/10^6
    excel["B2"] := ρ_w
    excel["E2"] := ε_t
    excel["D2"] := Pr_w
    excel["G2"] := ε_Mt
    excel["F2"] := ε_M
    excel["I2"] := α_w/10^3
    excel["H2"] := St_w_new*10^3
    excel["J2"] := q_к/10^6
T_r = [3897.26; 3873.4; 3846.05; 3835.27; 3823.7; 3811.31; 3798.22; 3725.61; 3701.11; 3680.83; 3670.71; 3665.66; 3666.13; 3660.5; 3643.57; 3625.65; 3611.19; 3599.47; 3589.63; 3581.13; 3573.72; 3567.2; 3561.43; 3556.29; 3551.69; 3547.57; 3543.88; 3540.56; 3537.56] K
T_w = [3312.67; 3292.39; 3269.14; 3259.98; 3250.15; 3239.62; 3228.49; 3166.77; 3145.94; 3128.71; 3120.11; 3115.81; 3116.21; 3111.43; 3097.03; 3081.8; 3069.51; 3059.55; 3051.18; 3043.96; 3037.66; 3032.12; 3027.21; 3022.84; 3018.93; 3015.43; 3012.3; 3009.48; 3006.93] K
H_r = [25232.2; 24297.8; 23276.6; 22890.2; 22486.7; 22067.7; 21640.6; 19547.3; 18928.8; 18443.6; 18209.3; 18094.2; 18104.8; 17977.7; 17603.3; 17218.4; 16914.9; 16672.9; 16471.7; 16299.8; 16151; 16020.9; 15906.6; 15805.4; 15715.3; 15634.9; 15563.2; 15499; 15441.2] kJ/kg
ρ_w = [3.83833; 3.43053; 3.00789; 2.85026; 2.6854; 2.51298; 2.33508; 1.41107; 1.101; 0.764291; 0.579909; 0.462829; 0.277091; 0.190076; 0.141951; 0.112094; 0.0918616; 0.0773415; 0.0665028; 0.058154; 0.0515571; 0.0462272; 0.0418413; 0.038172; 0.0350583; 0.0323962; 0.0301091; 0.0281381; 0.0264354] kg/m^3
H_w = [11581; 11276.6; 10936; 10804.2; 10664.2; 10516.1; 10361.4; 9538.8; 9275; 9062.3; 8958.05; 8906.52; 8911.29; 8854.19; 8684.91; 8509.92; 8371.83; 8262.07; 8171.25; 8094.03; 8027.42; 7969.47; 7918.71; 7873.91; 7834.12; 7798.74; 7767.3; 7739.19; 7713.9] kJ/kg
Re_ws/10^6 = [0.546585; 1.39215; 2.01245; 2.19413; 2.3575; 2.4995; 2.61497; 2.29521; 2.08036; 1.76885; 1.5569; 1.40197; 1.10628; 0.936205; 0.830869; 0.759479; 0.706578; 0.665506; 0.632821; 0.606279; 0.584365; 0.565956; 0.550275; 0.536706; 0.524805; 0.514414; 0.505462; 0.497916; 0.491741]
q_к = [9.00258; 12.3625; 13.1969; 13.198; 13.0729; 12.8266; 12.4667; 9.5919; 8.13885; 6.3492; 5.21982; 4.43609; 3.06093; 2.28055; 1.77006; 1.42723; 1.18872; 1.01454; 0.882408; 0.779136; 0.696508; 0.629058; 0.573069; 0.525882; 0.485592; 0.450936; 0.420978; 0.394977; 0.372332] MW/m^2
α_w = [15.3999; 21.2775; 22.8752; 22.9415; 22.7928; 22.436; 21.8817; 17.1639; 14.6602; 11.4996; 9.48013; 8.06783; 5.56615; 4.15344; 3.23869; 2.62433; 2.19451; 1.87906; 1.63881; 1.45045; 1.29931; 1.17563; 1.07273; 0.985827; 0.911476; 0.84741; 0.791935; 0.743717; 0.701674] kW/(m^2*K)
ε_t = [0.738071; 0.741273; 0.744829; 0.74617; 0.747553; 0.748958; 0.750339; 0.755924; 0.757137; 0.757954; 0.758313; 0.758483; 0.758467; 0.75865; 0.759167; 0.759686; 0.760108; 0.760468; 0.76079; 0.761085; 0.761355; 0.761604; 0.761833; 0.762044; 0.762238; 0.762417; 0.762582; 0.762733; 0.762872]
ε_M = [1.00052; 1.0019; 1.00352; 1.0042; 1.00495; 1.0058; 1.00676; 1.01377; 1.01751; 1.02344; 1.02808; 1.03197; 1.04119; 1.04786; 1.05272; 1.05655; 1.05981; 1.06265; 1.06516; 1.0674; 1.06943; 1.07127; 1.07296; 1.07452; 1.07597; 1.07733; 1.07859; 1.07977; 1.08085]
ε_Mt = [0.738454; 0.742679; 0.747452; 0.749301; 0.751254; 0.753305; 0.755414; 0.766331; 0.770394; 0.775721; 0.779609; 0.782734; 0.789711; 0.794961; 0.79919; 0.802647; 0.805568; 0.80811; 0.810363; 0.812384; 0.814213; 0.815881; 0.817413; 0.818831; 0.820149; 0.821376; 0.822516; 0.823573; 0.824549]
# [plot: St_w vs x]
# [plot: St_w_new vs x]
# [plot: ε_M vs x]
# [plot: Re_ws*10^-6 vs x]
# [plot: ε_t vs x]
# [plot: α_w (MW/(m^2*K)) vs x]
# [plot: ε_Mt vs x]
# [plot: αCpw vs x]
# [plot: q_к (MW/m^2) vs x]
# РАДИАЦИОННЫЙ ТЕПЛОВОЙ ПОТОК
σ_0 := 5.67*10^-8*W/(m^2*K^4)
d_кр := R_kr*2 = 0.0736 m
ρ := 2200 kg/m^3
ε_w := 0.8
t := 0.05 s
z := Para[1, 26] = 0.374489
l_э :=
    for i ∈ 0 .. last(y_otn)
        l_э[i] ← 0.9*2*y[i]/m
    l_э
μ_г_terra :=
    for i ∈ 0 .. 15
        μ_г_terra[i] ← Avduevskiy[i + 2, 14]*gm/mol
    μ_г_terra
C_H2O_terra :=
    for i ∈ 0 .. 15
        C_H2O_terra[i] ← Avduevskiy[i + 2, 47]*mol/kg
    C_H2O_terra
C_CO2_terra :=
    for i ∈ 0 .. 15
        C_CO2_terra[i] ← Avduevskiy[i + 2, 90]*mol/kg
    C_CO2_terra
C_H2O_terra = [8.52628; 8.78061; 9.12313; 9.36971; 9.54889; 9.68187; 9.78101; 9.85091; 9.88694; 9.86909; 9.75576; 9.48753; 9.01516; 8.32476; 7.43573; 6.39207] mol/kg
C_CO2_terra = [4.34239; 3.83461; 3.48561; 3.23882; 3.05948; 2.92557; 2.82227; 2.73807; 2.66066; 2.57142; 2.44013; 2.2334; 1.94701; 1.61909; 1.29937; 1.02162] mol/kg
μ_г_terra = [0.0256114; 0.0250642; 0.0250484; 0.0250474; 0.0250475; 0.0250479; 0.0250472; 0.0250386; 0.0250045; 0.0249183; 0.0247329; 0.0243927; 0.0238724; 0.0232043; 0.0224738; 0.021828] kg/mol
VS_μ_г := lspline(T_terra, μ_г_terra)
μ_г := interp(VS_μ_г, T_terra, μ_г_terra, T)
VS_C_H2O := lspline(T_terra, C_H2O_terra)
C_H2O := interp(VS_C_H2O, T_terra, C_H2O_terra, T)
VS_C_CO2 := lspline(T_terra, C_CO2_terra)
C_CO2 := interp(VS_C_CO2, T_terra, C_CO2_terra, T)
C_H2O = [7.0358; 7.40015; 7.79091; 7.93931; 8.09585; 8.26081; 8.43206; 9.3016; 9.55499; 9.77164; 9.85037; 9.87988; 9.88053; 9.84899; 9.81395; 9.78053; 9.74953; 9.72085; 9.69435; 9.66982; 9.64699; 9.62559; 9.60542; 9.58629; 9.56807; 9.55073; 9.53429; 9.51878; 9.50424] mol/kg
C_CO2 = [1.18592; 1.28865; 1.41487; 1.46783; 1.52683; 1.59258; 1.66488; 2.11252; 2.28065; 2.45487; 2.54183; 2.59462; 2.68411; 2.74079; 2.78527; 2.82279; 2.85583; 2.88562; 2.91282; 2.93787; 2.96109; 2.98277; 3.0031; 3.02228; 3.04045; 3.05766; 3.0739; 3.08918; 3.10351] mol/kg
μ_г = [0.0222095; 0.0224488; 0.0227429; 0.0228651; 0.0229994; 0.0231462; 0.0233031; 0.0241795; 0.0244735; 0.0247555; 0.0248807; 0.0249452; 0.0250187; 0.0250392; 0.0250454; 0.0250472; 0.0250477; 0.0250478; 0.0250478; 0.025048; 0.0250482; 0.0250484; 0.0250484; 0.0250483; 0.025048; 0.0250476; 0.025047; 0.0250464; 0.0250459] kg/mol
p_H2O :=
    for i ∈ 0 .. last(y_otn)
        p_H2O[i] ← C_H2O[i]*μ_г[i]*p[i]
    p_H2O
p_CO2 :=
    for i ∈ 0 .. last(y_otn)
        p_CO2[i] ← C_CO2[i]*μ_г[i]*p[i]
    p_CO2
p_H2O = [0.747239; 0.705657; 0.65527; 0.634372; 0.611195; 0.585428; 0.557104; 0.377972; 0.304615; 0.217546; 0.166775; 0.133665; 0.0802754; 0.0548513; 0.0406392; 0.0318272; 0.0258966; 0.0216687; 0.0185304; 0.016125; 0.0142326; 0.0127098; 0.0114613; 0.0104202; 0.00953959; 0.00878887; 0.00814569; 0.00759279; 0.00711626] MPa
p_CO2 = [0.125951; 0.122882; 0.119; 0.117284; 0.115268; 0.112863; 0.109999; 0.0858425; 0.0727077; 0.0546529; 0.0430354; 0.0351027; 0.0218073; 0.0152641; 0.0115337; 0.00918575; 0.00758561; 0.0064323; 0.00556774; 0.00489906; 0.00436863; 0.0039385; 0.00358333; 0.00328519; 0.0030314; 0.00281375; 0.00262621; 0.00246413; 0.00232374] MPa
ε_H2O :=
    for i ∈ 0 .. last(y_otn)
        ε_H2O[i] ← 4.4425*(p_H2O/MPa)[i]^0.8*l_э[i]^0.6*(T[i]/K/100)^-1
    ε_H2O
ε_CO2 :=
    for i ∈ 0 .. last(y_otn)
        ε_CO2[i] ← 1.5306*(p_CO2[i]/MPa*l_э[i])^0.33*(T[i]/K/100)^-0.5
    ε_CO2
ε :=
    for i ∈ 0 .. last(y_otn)
        ε[i] ← ε_H2O[i] + ε_CO2[i] - ε_H2O[i]*ε_CO2[i]
    ε
ε_H2O = [0.0226995; 0.0187655; 0.0170979; 0.0166283; 0.0161769; 0.0157294; 0.0152784; 0.0126629; 0.0114956; 0.00989805; 0.00879904; 0.00798076; 0.00638542; 0.00541552; 0.00476149; 0.00428985; 0.00392992; 0.00364412; 0.00341102; 0.00321681; 0.00305217; 0.00291039; 0.00278674; 0.00267761; 0.0025803; 0.0024932; 0.0024151; 0.00234508; 0.00228234]
ε_CO2 = [0.0578968; 0.0529902; 0.05141; 0.0510874; 0.0508338; 0.0506318; 0.0504666; 0.0495404; 0.0487999; 0.0472968; 0.0459516; 0.0448023; 0.0422167; 0.0404097; 0.0390726; 0.0380379; 0.0372018; 0.0365051; 0.0359128; 0.0354008; 0.0349523; 0.0345545; 0.0341981; 0.0338757; 0.0335816; 0.0333126; 0.0330666; 0.032842; 0.0326373]
ε = [0.0792821; 0.0707614; 0.0676289; 0.0668662; 0.0661884; 0.0655648; 0.064974; 0.0615759; 0.0597345; 0.0567267; 0.0543464; 0.0524255; 0.0483326; 0.0456064; 0.0436481; 0.0421646; 0.0409855; 0.0400162; 0.0392013; 0.0385037; 0.0378978; 0.0373643; 0.0368895; 0.0364626; 0.0360752; 0.0357228; 0.0354019; 0.03511; 0.0348451]
d_43 := 10.68*(d_кр/m)^0.293*(1 - e^(-11.28*z*t/s*p_tor/MPa)) = 3.24288
d :=
    for i ∈ 0 .. last(y_otn)
        d[i] ← 0.042*kg/m^3/ρ*nthroot(T[i]/K/d_43^2, 3)*z
    d
ε_ПС :=
    for i ∈ 0 .. last(y_otn)
        ε_ПС[i] ← 1 - (1 - ε[i])*e^(-d[i]*l_э[i])
    ε_ПС
q_р :=
    for i ∈ 0 .. last(y_otn)
        q_р[i] ← ε_w*ε_ПС[i]*σ_0/(W/(m^2*K^4))*((T[i]/K)^4 - (T_w[i]/K)^4)
    q_р*W/m^2
l_э = [0.09936; 0.0757026; 0.0690012; 0.0677664; 0.0669132; 0.0664074; 0.06624; 0.0708354; 0.0751914; 0.0832878; 0.0906804; 0.0975348; 0.116023; 0.132647; 0.147706; 0.16142; 0.1741; 0.185945; 0.197069; 0.207562; 0.217494; 0.226937; 0.235946; 0.244577; 0.252877; 0.260845; 0.268468; 0.275726; 0.2826]
ε_ПС = [0.0792868; 0.070765; 0.0676321; 0.0668694; 0.0661915; 0.0655679; 0.0649771; 0.0615791; 0.0597379; 0.0567304; 0.0543503; 0.0524297; 0.0483375; 0.0456119; 0.0436542; 0.0421711; 0.0409925; 0.0400237; 0.0392091; 0.0385119; 0.0379063; 0.0373731; 0.0368987; 0.036472; 0.036085; 0.0357327; 0.0354121; 0.0351205; 0.0348558]
q_р = [0.381044; 0.297238; 0.240299; 0.220996; 0.201266; 0.180869; 0.159871; 0.0463991; 0.00505486; -0.0431703; -0.0701507; -0.0874308; -0.1155; -0.126051; -0.128293; -0.127829; -0.126813; -0.125638; -0.124406; -0.123172; -0.121974; -0.120833; -0.119756; -0.118743; -0.117793; -0.116905; -0.116079; -0.115311; -0.114599] MW/m^2
q_sum := q_к + q_р
q_к = [9.00258; 12.3625; 13.1969; 13.198; 13.0729; 12.8266; 12.4667; 9.5919; 8.13885; 6.3492; 5.21982; 4.43609; 3.06093; 2.28055; 1.77006; 1.42723; 1.18872; 1.01454; 0.882408; 0.779136; 0.696508; 0.629058; 0.573069; 0.525882; 0.485592; 0.450936; 0.420978; 0.394977; 0.372332] MW/m^2
q_р = [0.381044; 0.297238; 0.240299; 0.220996; 0.201266; 0.180869; 0.159871; 0.0463991; 0.00505486; -0.0431703; -0.0701507; -0.0874308; -0.1155; -0.126051; -0.128293; -0.127829; -0.126813; -0.125638; -0.124406; -0.123172; -0.121974; -0.120833; -0.119756; -0.118743; -0.117793; -0.116905; -0.116079; -0.115311; -0.114599] MW/m^2
q_sum = [9.38362; 12.6597; 13.4372; 13.419; 13.2742; 13.0075; 12.6266; 9.6383; 8.14391; 6.30603; 5.14967; 4.34866; 2.94543; 2.1545; 1.64177; 1.2994; 1.0619; 0.888905; 0.758002; 0.655964; 0.574533; 0.508225; 0.453313; 0.407139; 0.367799; 0.334032; 0.304899; 0.279665; 0.257733] MW/m^2
# [plot: q_р (MW/m^2) vs x]
# [plot: q_к (MW/m^2) vs x]
# [plot: q_sum (MW/m^2) vs x]
# [Excel component]
    excel["A1"] := q_р/10^6
    excel["B1"] := q_sum/10^6
# Расчет потерь
β_вх := 33*deg
d_a := 314 mm
d_43 := 5.3
β_a := 10*deg
d_кр := 73.6 mm
L_a := x[last(x)] = 441.8 mm
y_a0 := d_a/d_кр = 4.2663
# Потери удельного импульса из-за рассеяния потока:
ξ_рас := (0.906 - 0.029*y_a0)*sin((β_вх + 1.1*β_a)/4.1)^2 = 0.0271249
# Потери удельного импульса из-за трения потока:
k = 1.18683
k_s := 0.0005 mm
T_st := 0.6
ξ_тр := 0.00272*sqrt(y_a0 - 1)*(2.62/(k^2*T_st^0.33) - 1)*(1 + 3.98*(k_s/d_кр)^0.3)*(L_a/d_кр)^0.1 = 0.00785812
# Потери из-за наличия k-фазы в ПС:
ξ_s0 := z*d_43^1.5/(0.0474*10^3)^1.33 = 0.0269816
k1 := 1.047 - 0.0013*5*10^6/10^5 = 0.982
k2 := 1.112 - 0.037*y_a0 = 0.954147
ξ_s := ξ_s0*k1*k2 = 0.025281
# Потери из-за утопленности сопла:
ξ_ут := 0.01
# Потери из-за химической неравновесности :
J_y_zam := 2851
J_y := Para[3, 33] = 2938.36
ξ_хн := 0.333*(1 - J_y_zam/J_y)*2*10^6/(5*10^6) = 0.00396015
# Потери из-за разгара критического сечения:
δ_кр := 0 mm
y_a := d_a/(d_кр + δ_кр) = 4.2663
ξ_кр := 0.5*(1 - (1.57/sqrt(k) - 0.66/y_a^0.6666)/(1.57/sqrt(k) - 0.66/y_a0^0.6666)) = 0
φ_c := 1 - (ξ_рас + ξ_тр + ξ_s + ξ_ут + ξ_хн + ξ_кр) = 0.925776
φ_c := 0.93
J_yд := J_y*φ_c = 2732.67
# [Excel component]
    excel["A1"] := ε_H2O
