# Исходные данные:
File := READEXCEL("..\1. Выбор заряда\Расчеты в Терре для всех топлив\1. Топлива.xlsx", "Sheet1!A1:U9")
# [Excel component]
    excel["A1"] := File
# Ведомый - ПХА-4М - 1 | Ведущий - ПХН-2М - 2
ρ_1 := File[5, 6]*kg/m^3 = 1800 kg/m^3
ρ_2 := File[5, 9]*kg/m^3 = 2430 kg/m^3
u_11 := File[6, 6]*mm/s = 6.49 mm/s
u_12 := File[6, 9]*mm/s = 14.5 mm/s
v_1 := File[7, 6] = 0.24
v_2 := File[7, 9] = 0.19
# Расчет по паре ПХА-4М - ПХН-2М:
Para := READEXCEL("..\1. Выбор заряда\Пара.xlsx", "Sheet1!A1:FM4")
# [Excel component]
    excel["A1"] := Para
R := Para[1, 15] J/(K*kg) = 376.087 J/(K*kg)
p_к := 5 MPa
T_w := 2500 K
p_кmax := 5 MPa
T_к := Para[1, 1] K = 3906.2 K
k := Para[1, 10] = 1.18683
η_w := Para[1, 20]*Pa*s = 0.0001035 Pa*s  # - коэффициент динамической вязкости
λ_w := Para[1, 21]*W/(m*K) = 0.355691 W/(m*K)  # - коэффициент теплопроводонсти
C_p := Para[1, 9]*(1000 J/(kg*K)) = 6492.39 J/(kg*K)
Pr := Para[1, 24] = 0.36956
z_k := Para[1, 26] = 0.374489  # - массовая доля конденсированных частиц
ρ_кф := 2200 kg/m^3
d_кр := 73.6 mm = 0.0736 m
ε_w := 0.8  # - степень черноты стенки
σ_0 := 5.67*10^-8*W/(m^2*K^4)  # - постоянная Больцмана
C_H2O := Para[1, 54] mol/kg = 6.89718 mol/kg
# - мольные концентрации молекул
C_CO2 := Para[1, 97] mol/kg = 1.14537 mol/kg
μ_г := Para[1, 14] gm/mol = 0.0221076 kg/mol
# Цилиндрическая часть
# Расчет времени воздействия:
e := 92.3778 mm
U := u_11*(p_к/(98066.5*Pa))^v_1 explicit, ALL → 6.49*mm/s*(5*MPa/(98066.5*Pa))^0.24 = 16.6737 mm/s
τ1 := e/U = 5.54032 s
D_1 :=
    for i ∈ 0 .. 12
        D_1[i] ← 500 mm
    D_1
# - эквивалентный размер области
t1 :=
    for i ∈ 0 .. last(D_1)
        t1[i] ← 0*s
    t1
# - время взимодействия ПС со стенкой
t :=
    for i ∈ 0 .. last(D_1)
        t[i] ← t1[i] + (40*s + τ1)/last(D_1)*i
    t
t = [0; 3.79503; 7.59005; 11.3851; 15.1801; 18.9751; 22.7702; 26.5652; 30.3602; 34.1552; 37.9503; 41.7453; 45.5403] s
W_1 := [25; 25; 27; 30; 32; 35; 37; 40; 42; 45; 47; 48; 50]*m/s
D_1 = [500; 500; 500; 500; 500; 500; 500; 500; 500; 500; 500; 500; 500] mm
# [Excel component]
    excel["A1"] := t
    excel["B1"] := W_1
    excel["C1"] := D_1*1000
# Число Маха:
M := W_1/sqrt(k*R*T_к)
# Статическая температура ПС :
T_к1 := T_к/(1 - (k - 1)/2*M^2)
M = [0.0189332; 0.0189332; 0.0204479; 0.0227199; 0.0242345; 0.0265065; 0.0280212; 0.0302931; 0.0318078; 0.0340798; 0.0355944; 0.0363518; 0.0378664]
T_к1 = [3906.33; 3906.33; 3906.35; 3906.39; 3906.41; 3906.46; 3906.49; 3906.53; 3906.57; 3906.62; 3906.66; 3906.68; 3906.72] K
# Коэффициент восстановления температуры:
r := Pr^(1/3) = 0.717621
# Температура на адиабатической стенке:
T_r :=
    for i ∈ 0 .. last(D_1)
        T_r[i] ← T_к1[i]*(1 + (k - 1)/2*r*M[i]^2)
    T_r
T_r = [3906.42; 3906.42; 3906.46; 3906.52; 3906.57; 3906.64; 3906.69; 3906.78; 3906.83; 3906.93; 3906.99; 3907.03; 3907.1] K
# Полная энтальпия ПС на адиабатической стенке:
H_r :=
    for i ∈ 0 .. last(D_1)
        H_r[i] ← C_p*T_r[i]
    H_r
H_r = [25362; 25362; 25362.3; 25362.7; 25363; 25363.4; 25363.8; 25364.3; 25364.7; 25365.3; 25365.7; 25366; 25366.4]*1000 J/kg
H_w := C_p*T_w explicit, ALL → 6492.39*J/(K*kg)*2500*K = 16231*1000 J/kg
ρ_w := p_кmax/(R*T_w) explicit, ALL → 5*MPa/(376.087*J/(kg*K)*2500*K) = 5.31792 kg/m^3
# Значение числа Рейнольдса и Прандтля у стенки:
Re_w :=
    for i ∈ 0 .. last(D_1)
        Re_w[i] ← ρ_w*W_1[i]*D_1[i]/η_w
    Re_w
Re_w = [642261; 642261; 693642; 770713; 822094; 899165; 950546; 1027617; 1078998; 1156069; 1207450; 1233141; 1284521]
Pr_w := η_w*C_p/λ_w explicit, ALL → 0.0001035*s*Pa*6492.39*J/(K*kg)/(0.355691*W/(K*m)) = 1.88917
# Значение числа Стантона на идеальной стенке:
St' :=
    for i ∈ 0 .. last(D_1)
        St'[i] ← 0.0296*Re_w[i]^-0.2*Pr_w^-0.6*(H_w/H_r[i])^0.39*(1 + r*(k - 1)/2*M[i]^2)^0.11
    St'
St' = [0.00117055; 0.00117055; 0.00115267; 0.00112863; 0.00111415; 0.00109435; 0.00108225; 0.0010655; 0.00105515; 0.00104068; 0.00103166; 0.00102732; 0.00101896]
# Значение числа Стантона для реальных условий:
k_в := 0.9
z_k = 0.374489
k_ш := 1.095
z := z_k/(1 - z_k) = 0.598693
k_т := 1
k_р :=
    for i ∈ 0 .. last(D_1)
        k_р[i] ← 1 + 0.0246*Re_w[i]^-0.3*z^2.45
    k_р
St :=
    for i ∈ 0 .. last(D_1)
        St[i] ← St'[i]*k_в*k_ш*k_т*k_р[i]
    St
k_р = [1.00013; 1.00013; 1.00012; 1.00012; 1.00012; 1.00011; 1.00011; 1.00011; 1.00011; 1.00011; 1.0001; 1.0001; 1.0001]
St = [0.00115372; 0.00115372; 0.00113609; 0.00111239; 0.00109812; 0.00107861; 0.00106668; 0.00105016; 0.00103996; 0.0010257; 0.00101681; 0.00101253; 0.00100429]
# Плотность конвективного теплового потока к стенке КС:
α :=
    for i ∈ 0 .. last(D_1)
        α[i] ← ρ_w*W_1[i]*St[i]*C_p
    α
q_к :=
    for i ∈ 0 .. last(D_1)
        q_к[i] ← α[i]*(T_к - T_w)
    q_к
α = [995.836; 995.836; 1059.07; 1152.2; 1213.24; 1303.4; 1362.64; 1450.32; 1508.04; 1593.59; 1650; 1678.02; 1733.71] W/(m^2*K)
q_к = [1.40034; 1.40034; 1.48926; 1.62022; 1.70606; 1.83284; 1.91614; 2.03944; 2.1206; 2.24091; 2.32022; 2.35963; 2.43794] MW/m^2
# [Excel component]
    excel["A2"] := M
    excel["D2"] := H_r/1000
    excel["G2"] := St*10^3
    excel["B2"] := T_к1
    excel["E2"] := Re_w/10^6
    excel["H2"] := α/10^3
    excel["C2"] := T_r
    excel["F2"] := St'*10^3
    excel["I2"] := q_к/10^6
# Расчет радиационного ТО
# Парциальное давление:
p_H2O := C_H2O*μ_г*p_к explicit, ALL → 6.89718*mol/kg*0.0221076*kg/mol*5*MPa = 7.624 bar
p_CO2 := C_CO2*μ_г*p_к explicit, ALL → 1.14537*mol/kg*0.0221076*kg/mol*5*MPa = 1.26607 bar
# Средняя длина пути луча:
l :=
    for i ∈ 0 .. last(D_1)
        l[i] ← 0.9*D_1[i]
    l
# Интегральные излучательные способности:
ε_H2O := 0.24
l = [0.45; 0.45; 0.45; 0.45; 0.45; 0.45; 0.45; 0.45; 0.45; 0.45; 0.45; 0.45; 0.45] m
ε_CO2 := 0.035
ε_г := ε_H2O + ε_CO2 - ε_H2O*ε_CO2 = 0.2666
d_43 := 10.68*(d_кр/m)^0.293*(1 - exp(-11.28*z_k*0.5*5)) = 4.97228
d := 0.042*R*T_к/p_к*kg/m^3*nthroot(T_к/K/d_43^2, 3)*z_k = 0.0249829
ε_ПС :=
    for i ∈ 0 .. last(D_1)
        ε_ПС[i] ← 1 - (1 - ε_г)*exp(-d*l[i]/m)
    ε_ПС
q_р :=
    for i ∈ 0 .. last(D_1)
        q_р[i] ← ε_w*ε_ПС[i]*σ_0*(T_к^4 - T_w^4)
    q_р
ε_ПС = [0.274799; 0.274799; 0.274799; 0.274799; 0.274799; 0.274799; 0.274799; 0.274799; 0.274799; 0.274799; 0.274799; 0.274799; 0.274799]
q_р = [2.41515; 2.41515; 2.41515; 2.41515; 2.41515; 2.41515; 2.41515; 2.41515; 2.41515; 2.41515; 2.41515; 2.41515; 2.41515] MW/m^2
# Определение толщины ТЗП на цилиндрической части
ρ_п := 1300 kg/m^3
φ := 0.6
J_к := Para[1, 4]*J/kg = -2030.06 J/kg
C_pп := 2600*J/(kg*K)
Q_п := 3*10^6 J/kg
T_п0 := 293 K
λ_п := 0.9 W/(m*K)
α_п := 2*10^-4*1/K
T_м := 500 K
J_п := -4*10^6*J/kg
# Скорость уноса массы материала ТЗП:
U_п :=
    for i ∈ 0 .. last(D_1)
        U_п[i] ← (q_к[i] + q_р[i])/(ρ_п*(Q_п + φ*(J_к - J_п) + C_pп*(T_w - T_п0)))
    U_п
a_п := λ_п/(C_pп*ρ_п) = 2.66272e-7 m^2/s
# Необходимая толщина слоя ТЗП:
δ_п :=
    for i ∈ 0 .. last(D_1)
        δ_п[i] ← a_п/U_п[i]*ln((T_w - T_п0)/(T_м - T_п0)) + U_п[i]*t[i]
    δ_п
δ_п = [2.39124; 3.39137; 4.38365; 5.43423; 6.5349; 7.71525; 8.91845; 10.2217; 11.5229; 12.9437; 14.3392; 15.6782; 17.1452] mm
# [Excel component]
    excel["A2"] := l
    excel["D2"] := U_п*1000
    excel["B2"] := ε_ПС
    excel["E2"] := δ_п*1000
    excel["C2"] := q_р*10^-6
# Заднее днище
d2 :=
    for i ∈ 0 .. 12
        if i == 12
            d2[i] ← 500.0001 mm
        else
            d2[i] ← 500 mm
    d2
D_2 :=
    for i ∈ 0 .. last(d2)
        D_2[i] ← d2[i] - d2[0]/last(d2)*i
    D_2
D_2 = [500; 458.333; 416.667; 375; 333.333; 291.667; 250; 208.333; 166.667; 125; 83.3333; 41.6667; 0.0001] mm
W_2 := [50; 62.5; 75; 87.5; 100; 112.5; 125; 137.5; 150; 162.5; 175; 187.5; 200]*m/s
t := 48.76 s
# Число Маха:
M_2 := W_2/sqrt(k*R*T_к)
# Статическая температура ПС :
T2_к1 := T_к/(1 - (k - 1)/2*M_2^2)
M_2 = [0.0378664; 0.047333; 0.0567996; 0.0662663; 0.0757329; 0.0851995; 0.0946661; 0.104133; 0.113599; 0.123066; 0.132533; 0.141999; 0.151466]
T2_к1 = [3906.72; 3907.02; 3907.38; 3907.8; 3908.29; 3908.85; 3909.47; 3910.16; 3910.91; 3911.73; 3912.62; 3913.57; 3914.59] K
# Коэффициент восстановления температуры:
r := Pr^(1/3) = 0.717621
# Температура на адиабатической стенке:
T2_r :=
    for i ∈ 0 .. last(D_2)
        T2_r[i] ← T2_к1[i]*(1 + (k - 1)/2*r*M_2[i]^2)
    T2_r
# Полная энтальпия ПС на адиабатической стенке:
H2_r :=
    for i ∈ 0 .. last(D_2)
        H2_r[i] ← C_p*T2_r[i]
    H2_r
H_w := C_p*T_w = 16231*1000 J/kg
T2_r = [3907.1; 3907.6; 3908.22; 3908.95; 3909.8; 3910.75; 3911.82; 3913; 3914.3; 3915.71; 3917.23; 3918.86; 3920.61] K
H2_r = [25366.4; 25369.7; 25373.7; 25378.4; 25383.9; 25390.1; 25397.1; 25404.7; 25413.1; 25422.3; 25432.2; 25442.8; 25454.1]*1000 J/kg
ρ_w := p_кmax/(R*T_w) = 5.31792 kg/m^3
# Значение числа Рейнольдса и Прандтля у стенки:
Re2_w :=
    for i ∈ 0 .. last(D_2)
        Re2_w[i] ← ρ_w*W_2[i]*D_2[i]/η_w
    Re2_w
Pr_w := η_w*C_p/λ_w = 1.88917
Re2_w = [1284521; 1471847; 1605652; 1685934; 1712695; 1685934; 1605652; 1471847; 1284521; 1043674; 749304; 401413; 1.02762]
# Значение числа Стантона на идеальной стенке:
St2' :=
    for i ∈ 0 .. last(D_2)
        St2'[i] ← 0.0296*Re2_w[i]^-0.2*Pr_w^-0.6*(H_w/H2_r[i])^0.39*(1 + r*(k - 1)/2*M_2[i]^2)^0.11
    St2'
St2' = [0.00101896; 0.00099155; 0.000974391; 0.000964867; 0.000961761; 0.000964714; 0.000974082; 0.000991079; 0.00101832; 0.00106136; 0.00113393; 0.00128451; 0.0168665]
# Значение числа Стантона для реальных условий:
k_в := 0.9
z_k = 0.374489
k_ш := 1.095
z := z_k/(1 - z_k) = 0.598693
k_т := 1
k_р2 :=
    for i ∈ 0 .. last(D_2)
        k_р2[i] ← 1 + 0.0246*Re2_w[i]^-0.3*z^2.45
    k_р2
St2 :=
    for i ∈ 0 .. last(D_2)
        St2[i] ← St2'[i]*k_в*k_ш*k_т*k_р2[i]
    St2
k_р = [1.00013; 1.00013; 1.00012; 1.00012; 1.00012; 1.00011; 1.00011; 1.00011; 1.00011; 1.00011; 1.0001; 1.0001; 1.0001]
St2 = [0.00100429; 0.000977269; 0.000960355; 0.000950967; 0.000947905; 0.000950816; 0.000960051; 0.000976805; 0.00100365; 0.00104609; 0.00111763; 0.00126607; 0.0167373]
# Плотность конвективного теплового потока к стенке КС:
α2 :=
    for i ∈ 0 .. last(D_2)
        α[i] ← ρ_w*W_2[i]*St2[i]*C_p
    α
q2_к :=
    for i ∈ 0 .. last(D_2)
        q_к[i] ← α2[i]*(T_к - T_w)
    q_к
α2 = [1733.71; 2108.82; 2486.79; 2872.89; 3272.74; 3693.14; 4143.34; 4637.21; 5197.83; 5869.06; 6752.76; 8196.09; 115574] W/(m^2*K)
q2_к = [2.43794; 2.96543; 3.49692; 4.03986; 4.60212; 5.19329; 5.82636; 6.52084; 7.30919; 8.25307; 9.49573; 11.5253; 162.521] MW/m^2
# Расчет радиационного ТО
# Парциальное давление:
p_H2O := C_H2O*μ_г*p_к explicit, ALL → 6.89718*mol/kg*0.0221076*kg/mol*5*MPa = 7.624 bar
p_CO2 := C_CO2*μ_г*p_к explicit, ALL → 1.14537*mol/kg*0.0221076*kg/mol*5*MPa = 1.26607 bar
# Средняя длина пути луча:
l2 :=
    for i ∈ 0 .. last(D_2)
        l2[i] ← 0.9*D_2[i]
    l2
# Интегральные излучательные способности:
l2 = [0.45; 0.4125; 0.375; 0.3375; 0.3; 0.2625; 0.225; 0.1875; 0.15; 0.1125; 0.075; 0.0375; 9e-8] m
ε_H2O := 0.24
ε_CO2 := 0.035
ε_г := ε_H2O + ε_CO2 - ε_H2O*ε_CO2 = 0.2666
d_43 := 10.68*(d_кр/m)^0.293*(1 - exp(-11.28*z_k*0.5*5)) = 4.97228
d := 0.042*R*T_к/p_к*kg/m^3*nthroot(T_к/K/d_43^2, 3)*z_k = 0.0249829
ε2_ПС :=
    for i ∈ 0 .. last(D_2)
        ε2_ПС[i] ← 1 - (1 - ε_г)*exp(-d*l2[i]/m)
    ε2_ПС
q2_р :=
    for i ∈ 0 .. last(D_2)
        q_р[i] ← ε_w*ε2_ПС[i]*σ_0*(T_к^4 - T_w^4)
    q_р
ε2_ПС = [0.274799; 0.274119; 0.273439; 0.272758; 0.272076; 0.271394; 0.270711; 0.270027; 0.269343; 0.268658; 0.267973; 0.267287; 0.2666]
q2_р = [2.41515; 2.40917; 2.40319; 2.39721; 2.39122; 2.38522; 2.37922; 2.37321; 2.3672; 2.36118; 2.35516; 2.34913; 2.34309] MW/m^2
# [Excel component]
    excel["A2"] := M_2
    excel["D2"] := H2_r/1000
    excel["G2"] := St2*10^3
    excel["B2"] := T2_к1
    excel["E2"] := Re2_w/10^6
    excel["H2"] := α2/10^3
    excel["C2"] := T2_r
    excel["F2"] := St2'*10^3
    excel["I2"] := q2_к/10^6
# Определение толщины ТЗП на заднем днище
ρ_п := 1300 kg/m^3
φ := 0.6
J_к := Para[1, 4]*J/kg = -2030.06 m^2/s^2
C_pп := 2600*J/(kg*K)
Q_п := 3*10^6 J/kg
T_п0 := 293 K
λ_п := 0.9 W/(m*K)
α_п := 2*10^-4*1/K
T_м := 500 K
J_п := -4*10^6*J/kg
# Скорость уноса массы материала ТЗП:
U2_п :=
    for i ∈ 0 .. last(D_2)
        U_п[i] ← (q2_к[i] + q2_р[i])/(ρ_п*(Q_п + φ*(J_к - J_п) + C_pп*(T_w - T_п0)))
    U_п
a_п := λ_п/(C_pп*ρ_п) = 2.66272e-7 m^2/s
# Необходимая толщина слоя ТЗП:
δ2_п :=
    for i ∈ 0 .. last(D_2)
        δ2_п[i] ← a_п/U2_п[i]*ln((T_w - T_п0)/(T_м - T_п0)) + U2_п[i]*t
    δ2_п
δ2_п = [18.2245; 19.7984; 21.4171; 23.0965; 24.8572; 26.7272; 28.7471; 30.9797; 33.5315; 36.6068; 40.6819; 47.3847; 555.293] mm
D_2/2 = [250; 229.167; 208.333; 187.5; 166.667; 145.833; 125; 104.167; 83.3333; 62.5; 41.6667; 20.8333; 5e-5] mm
# [Excel component]
    excel["A2"] := l2
    excel["D2"] := U2_п*1000
    excel["B2"] := ε2_ПС
    excel["E2"] := δ2_п*1000
    excel["C2"] := q2_р*10^-6
