p_выл := 2.1 MPa  # - давление вылета  # 42% от 5 МПа
D_уст := 115 mm = 0.115 m  # - диаметр, на котром установлена заглушка
F_загл := (π*D_уст^2)/4 = 0.0103869 m^2
P_выл := p_выл*F_загл = 21.8125 kN
P_тр := P_выл/cos(25 deg) = 24.0674 kN
# Для крепления зауглушки используется какой-то клей, допускаемое значение на срезе = 12,5 МПа
τ := 12.5 MPa
# Величина боковой поверхности:
F_бок := P_тр/τ = 0.00192539 m^2
# Ширина боковой стенки заглушки:
h := F_бок/D_уст = 0.0167425 m
