p_кmax := 6.85 MPa
d_01 := 0 m
# - диаметры переднего и заднего полюсных отверстий
d_02 := 0.340 m
d := 0.513 m  # - наружный диаметр корпуса
k_з := 1.2
σ_вдоп := 2500 MPa  # - предел прочности на разрыв в тангенциальном направлении
α := 0.7
σ_в := σ_вдоп/k_з = 2083.33 MPa
d_011 := d_01/d = 0
d_021 := d_02/d = 0.662768
σ_вк := σ_в = 2083.33 MPa  # - допустимые напряжение при кольцевой намотке
σ_вс := σ_вк*α = 1458.33 MPa  # - при спиаральной намотке
# Углы намотки волокон у переднего  и заднего  днищ:
β_1 := acos(sqrt(1 - d_011^2)) = 0 deg
β_2 := acos(sqrt(1 - d_021^2)) = 41.5113 deg
# Толщины обечаек спиральной намотки в месте соединения цилиндрической обечайки с передним и задним днищами:
h_c1 := p_кmax*d/(2*σ_вс*cos(β_1)^2) = 1.20482 mm
h_c2 := p_кmax*d/(2*σ_вс*cos(β_2)^2) = 2.14863 mm
# Угол намотки волокон цилиндрической части оболочки:
β := (β_1 + β_2)/2 = 20.7557 deg
# Толщины спиральной и кольцевой намоток в центральной части обечайки:
h_c := h_c2*cos(β_1)/cos(β_2) = 2.86933 mm
h_к := α*h_c*(3*cos(β)^2 - 1) = 3.26032 mm
h_c1 := 2 mm
h_c := 3 mm
h_c2 := 3 mm
h_к := 4 mm
# Толщина центральной части цилиндрической обечайки
δ_ц := h_c + h_к = 7 mm
# Толщины обечаек в центральной части переднего и заднего днища
δ_1 := h_c1/d_011 explicit, ALL → 2*mm/0  # error: Невозможно вычислить выражение, поскольку оно делится на ноль.
δ_2 := h_c2/d_021 explicit, ALL → 3*mm/0.662768031189 = 4.52647 mm
d_1 := [0.0000001; 40; 85; 130; 180; 245; 300; d_02/mm; 390; 440; 480; 512.9]*mm
d_1/2 = [5e-8; 20; 42.5; 65; 90; 122.5; 150; 170; 195; 220; 240; 256.45] mm
d' :=
    for i ∈ 0 .. 11
        d'[i] ← d_1[i]/d
    d'
h_r1 :=
    for i ∈ 0 .. 11
        h_r1[i] ← h_c1*sqrt((1 - d_011^2)/(d'[i] - d_011^2))
    h_r1
h_r2 :=
    for i ∈ 0 .. 11
        h_r2[i] ← h_c2*sqrt((1 - d_021^2)/(d'[i] - d_021^2))
    h_r2
d' = [1.94932e-10; 0.0779727; 0.165692; 0.253411; 0.350877; 0.477583; 0.584795; 0.662768; 0.760234; 0.8577; 0.935673; 0.999805]
h_r1 = [143248; 7.1624; 4.91337; 3.97299; 3.37639; 2.89405; 2.61534; 2.45668; 2.2938; 2.15955; 2.06761; 2.00019] mm
h_r2 = [3.38953i; 3.73744i; 4.29504i; 5.21099i; 7.55638i; 11.4757; 5.8887; 4.75178; 3.96522; 3.47285; 3.18846; 3.00052] mm
# [Excel component]
    excel["A1"] := d_1*1000
    excel["C1"] := h_r1*1000
    excel["B1"] := d'
    excel["D1"] := h_r2*1000
