# График влияния соотношения скоростей на угол наклона и относительный расход основного топлива
k == U_1/U_2
k1 :=
    for i ∈ 0 .. 50
        k1[i] ← 0
    k1
k :=
    for i ∈ 0 .. 50
        k[i] ← k1[i] + i/50
    k
alpha2 :=
    for i ∈ 0 .. last(k)
        alpha2[i] ← asin(k[i])/deg
    alpha2
# [plot: alpha2 vs k]
# [Excel component]
    excel["A1"] := k
    excel["B1"] := alpha2
# Относительный расход
m_отн :=
    for i ∈ 1 .. last(k)
        m_отн[i] ← 1/k[i]
    m_отн
# [plot: m_отн vs k]
# [Excel component]
    excel["A1"] := k
    excel["B1"] := m_отн
# График влияния соотношения диаметров и термодинамики топлив на общую термодинамику двигателя
x == d/D
x1 :=
    for i ∈ 0 .. 50
        x1[i] ← 0
    x1
x :=
    for i ∈ 0 .. 50
        x[i] ← x1[i] + i/500
    x
RT1 := 1
RT2 := [1; 0.8; 0.6; 0.4]
m_1отн :=
    for i ∈ 0 .. last(x)
        m_1отн[i] ← 1 - x[i]^2
    m_1отн
m_2отн :=
    for i ∈ 0 .. last(x)
        m_2отн[i] ← x[i]^2
    m_2отн
RT_сум1 :=
    for i ∈ 0 .. last(x)
        RT_сум1[i] ← RT1*m_1отн[i] + RT2[0]*m_2отн[i]
    RT_сум1
RT_сум2 :=
    for i ∈ 0 .. last(x)
        RT_сум2[i] ← RT1*m_1отн[i] + RT2[1]*m_2отн[i]
    RT_сум2
RT_сум3 :=
    for i ∈ 0 .. last(x)
        RT_сум3[i] ← RT1*m_1отн[i] + RT2[2]*m_2отн[i]
    RT_сум3
RT_сум4 :=
    for i ∈ 0 .. last(x)
        RT_сум4[i] ← RT1*m_1отн[i] + RT2[3]*m_2отн[i]
    RT_сум4
# [plot: RT_сум1, RT_сум2, RT_сум3, RT_сум4 vs x]
# [Excel component]
    excel["A1"] := x*1700
    excel["B1"] := RT_сум1
    excel["D1"] := RT_сум3
    excel["C1"] := RT_сум2
    excel["E1"] := RT_сум4
# Комплексное влияние параметров закона горения на относительный расход в широком диапазоне давлений
u_11 := 0.001
m == v_2/v_1
n == u_12/u_11
x == d/D == 0
v_1 := 0.2
m := [1; 2; 4]
n := [1; 2; 4]
p_k1 :=
    for i ∈ 0 .. 50
        p_k1[i] ← 1
    p_k1
p_k :=
    for i ∈ 0 .. 50
        p_k[i] ← p_k1[i] + i/5
    p_k
# m=1, n=1 | m=2, n=1
m1 :=
    for i ∈ 0 .. last(p_k)
        m1[i] ← n[0]*(p_k[i]*10^6/98066.5)^(v_1*(m[0] - 1))
    m1
m4 :=
    for i ∈ 0 .. last(p_k)
        m4[i] ← n[0]*(p_k[i]*10^6/98066.5)^(v_1*(m[1] - 1))
    m4
# m=1, n=2 | m=2, n=2
m2 :=
    for i ∈ 0 .. last(p_k)
        m2[i] ← n[1]*(p_k[i]*10^6/98066.5)^(v_1*(m[0] - 1))
    m2
m5 :=
    for i ∈ 0 .. last(p_k)
        m5[i] ← n[1]*(p_k[i]*10^6/98066.5)^(v_1*(m[1] - 1))
    m5
# m=1, n=4 | m=2, n=4
m3 :=
    for i ∈ 0 .. last(p_k)
        m3[i] ← n[2]*(p_k[i]*10^6/98066.5)^(v_1*(m[0] - 1))
    m3
m6 :=
    for i ∈ 0 .. last(p_k)
        m6[i] ← n[2]*(p_k[i]*10^6/98066.5)^(v_1*(m[1] - 1))
    m6
# m=4, n=1
m7 :=
    for i ∈ 0 .. last(p_k)
        m7[i] ← n[0]*(p_k[i]*10^6/98066.5)^(v_1*(m[2] - 1))
    m7
# m=4, n=2
m8 :=
    for i ∈ 0 .. last(p_k)
        m8[i] ← n[1]*(p_k[i]*10^6/98066.5)^(v_1*(m[2] - 1))
    m8
# m=4, n=4
m9 :=
    for i ∈ 0 .. last(p_k)
        m9[i] ← n[2]*(p_k[i]*10^6/98066.5)^(v_1*(m[2] - 1))
    m9
# [plot: m1, m2, m3, m4, m5, m6, m7, m8, m9 vs p_k]
File := READEXCEL("..\1. Выбор заряда\Расчеты в Терре для всех топлив\1. Топлива.xlsx", "Sheet1!A1:U9")
# [Excel component]
    excel["A1"] := File
D := 0.5 m
d := 0.02 m = 20 mm
p_k1 :=
    for i ∈ 0 .. 50
        p_k1[i] ← 3*MPa
    p_k1
p_к :=
    for i ∈ 0 .. 50
        p_к[i] ← p_k1[i] + i/12.5*MPa
    p_к
# Синус полуугла = соотношение скоростей:
sinalpha :=
    for j ∈ 1 .. 9
        sinalpha[0, j] ← File[0, j]
        sinalpha[j, 0] ← File[0, j]
        for i ∈ 1 .. 9
            if i ≠ j
                u_11 ← File[6, j]*mm/s
                u_12 ← File[6, i]*mm/s
                v_1 ← File[7, j]
                v_2 ← File[7, i]
                for k ∈ 0 .. last(p_к)
                    sinalpha[i, j] ← u_11*(p_к[k]/(98066.5 Pa))^v_1/(u_12*(p_к[k]/(98066.5 Pa))^v_2)
        sinalpha
# Расход:
m_sum :=
    for j ∈ 1 .. 9
        m_sum[0, j] ← File[0, j]
        m_sum[j, 0] ← File[0, j]
        for i ∈ 1 .. 9
            if i ≠ j
                ρ_1 ← File[5, j]*kg/m^3
                ρ_2 ← File[5, i]*kg/m^3
                u_11 ← File[6, j]*mm/s
                u_12 ← File[6, i]*mm/s
                v_1 ← File[7, j]
                v_2 ← File[7, i]
                sinalpha[i, j] ← u_11*(p_к/(98066.5 Pa))^v_1/(u_12*(p_к/(98066.5 Pa))^v_2)
                m_1 ← ρ_1*u_12*(p_к/(98066.5 Pa))^v_2*π/4*(D^2 - d^2)
                m_2 ← ρ_2*u_12*(p_к/(98066.5*Pa))^v_2*π/4*d^2
                if sinalpha[i, j] < 1
                    if v_2 < v_1
                        m_sum[i, j] ← m_1 + m_2
        m_sum  # error: Значение должно быть скалярным.
m_1 :=
    for j ∈ 1 .. 9
        m_1[0, j] ← File[0, j]
        m_1[j, 0] ← File[0, j]
        for i ∈ 1 .. 9
            if i ≠ j
                ρ_1 ← File[5, j]*kg/m^3
                ρ_2 ← File[5, i]*kg/m^3
                u_11 ← File[6, j]*mm/s
                u_12 ← File[6, i]*mm/s
                v_1 ← File[7, j]
                v_2 ← File[7, i]
                sinalpha[i, j] ← u_11*(p_к/(98066.5 Pa))^v_1/(u_12*(p_к/(98066.5 Pa))^v_2)
                if sinalpha[i, j] < 1
                    if v_2 < v_1
                        m_1[i, j] ← ρ_1*u_12*(p_к/(98066.5 Pa))^v_2*π/4*(D^2 - d^2)
        m_1  # error: Значение должно быть скалярным.
m_2 :=
    for j ∈ 1 .. 9
        m_2[0, j] ← File[0, j]
        m_2[j, 0] ← File[0, j]
        for i ∈ 1 .. 9
            if i ≠ j
                ρ_1 ← File[5, j]*kg/m^3
                ρ_2 ← File[5, i]*kg/m^3
                u_11 ← File[6, j]*mm/s
                u_12 ← File[6, i]*mm/s
                v_1 ← File[7, j]
                v_2 ← File[7, i]
                sinalpha[i, j] ← u_11*(p_к/(98066.5 Pa))^v_1/(u_12*(p_к/(98066.5 Pa))^v_2)
                if sinalpha[i, j] < 1
                    if v_2 < v_1
                        m_2[i, j] ← ρ_2*u_12*(p_к/(98066.5 Pa))^v_2*π/4*d^2
        m_2  # error: Значение должно быть скалярным.
l :=
    for j ∈ 1 .. 9
        l[0, j] ← File[0, j]
        l[j, 0] ← File[0, j]
        for i ∈ 1 .. 9
            if i ≠ j
                ρ_1 ← File[5, j]*kg/m^3
                ρ_2 ← File[5, i]*kg/m^3
                u_11 ← File[6, j]*mm/s
                u_12 ← File[6, i]*mm/s
                v_1 ← File[7, j]
                v_2 ← File[7, i]
                sinalpha[i, j] ← u_11*(p_к/(98066.5*Pa))^v_1/(u_12*(p_к/(98066.5*Pa))^v_2)
                if sinalpha[i, j] < 1
                    if v_2 < v_1
                        l[i, j] ← (D - d)/(2*u_11/u_12*(p_к/(98066.5*Pa))^(v_1 - v_2))
        l  # error: Значение должно быть скалярным.
arcsin2 :=
    for j ∈ 1 .. 9
        arcsin2[0, j] ← File[0, j]
        arcsin2[j, 0] ← File[0, j]
        for i ∈ 1 .. 9
            if i ≠ j
                u_11 ← File[6, j]*mm/s
                u_12 ← File[6, i]*mm/s
                v_1 ← File[7, j]
                v_2 ← File[7, i]
                sinalpha[i, j] ← u_11*(p_к/(98066.5*Pa))^v_1/(u_12*(p_к/(98066.5*Pa))^v_2)
                if sinalpha[i, j] < 1
                    if v_2 < v_1
                        arcsin2[i, j] ← asin(u_11/u_12*(p_к/(98066.5*Pa))^(v_1 - v_2))/deg
        arcsin2  # error: Значение должно быть скалярным.
sinalpha = [
    0, "ARCADENE", "ARCIT-373D", "RD-2435", "TP-H-3062", "ПХА-3М", "ПХА-4М", "ПХА-5М", "ПХК-1М", "ПХН-2М";
    "ARCADENE", 0, 4.83374, 2.59371, 2.77221, 2.21364, 3.83462, 2.21364, 3.30798, 6.92096;
    "ARCIT-373D", 0.206879, 0, 0.536584, 0.573513, 0.457956, 0.793302, 0.457956, 0.684351, 1.4318;
    "RD-2435", 0.385548, 1.86364, 0, 1.06882, 0.853465, 1.47843, 0.853465, 1.27538, 2.66836;
    "TP-H-3062", 0.360722, 1.74364, 0.93561, 0, 0.798511, 1.38323, 0.798511, 1.19326, 2.49655;
    "ПХА-3М", 0.451744, 2.18362, 1.17169, 1.25233, 0, 1.73227, 1, 1.49436, 3.12651;
    "ПХА-4М", 0.260782, 1.26055, 0.676394, 0.722944, 0.577278, 0, 0.577278, 0.862661, 1.80486;
    "ПХА-5М", 0.451744, 2.18362, 1.17169, 1.25233, 1, 1.73227, 0, 1.49436, 3.12651;
    "ПХК-1М", 0.3023, 1.46124, 0.784078, 0.838039, 0.669183, 1.1592, 0.669183, 0, 2.0922;
    "ПХН-2М", 0.144489, 0.698421, 0.374762, 0.400553, 0.319846, 0.554058, 0.319846, 0.477965, 0
]
m_1 =  # error: Эта переменная не определена. Проверьте правильность установки обозначения.
m_2 =  # error
m_sum =  # error
arcsin2 =  # error
l =  # error
# Ведущий - ПХН-2М - 2
# Ведомый - ПХА-4М - 1
ρ_1 := File[5, 6]*kg/m^3 = 1800 kg/m^3
ρ_2 := File[5, 9]*kg/m^3 = 2430 kg/m^3
u_11 := File[6, 6]*mm/s = 6.49 mm/s
u_12 := File[6, 9]*mm/s = 14.5 mm/s
v_1 := File[7, 6] = 0.24
v_2 := File[7, 9] = 0.19
m_1 := ρ_1*u_12*(p_к/(98066.5 Pa))^v_2*π/4*(D^2 - d^2) = [
    9.80029; 9.84942; 9.89752; 9.94465; 9.99085; 10.0361; 10.0806; 10.1242; 10.1671; 10.2091
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] kg/s
m_2 := ρ_2*u_12*(p_к/(98066.5 Pa))^v_2*π/4*d^2 = [
    0.0212026; 0.0213088; 0.0214129; 0.0215149; 0.0216148; 0.0217128; 0.021809; 0.0219034; 0.021996; 0.0220871
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] kg/s
m_sum := m_1 + m_2 = [
    9.8215; 9.87073; 9.91894; 9.96617; 10.0125; 10.0579; 10.1024; 10.1461; 10.1891; 10.2312
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] kg/s
arcsin2 := asin(u_11/u_12*(p_к/(98066.5 Pa))^(v_1 - v_2)) = [
    32.0782; 32.1255; 32.1717; 32.2167; 32.2608; 32.3039; 32.3461; 32.3873; 32.4278; 32.4673
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] deg
g_1 := m_1/m_sum = [
    0.997841; 0.997841; 0.997841; 0.997841; 0.997841; 0.997841; 0.997841; 0.997841; 0.997841; 0.997841
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]
g_2 := m_2/m_sum = [
    0.00215879; 0.00215879; 0.00215879; 0.00215879; 0.00215879; 0.00215879; 0.00215879; 0.00215879; 0.00215879; 0.00215879
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]
