# Содержание
M_т := 432.9 kg
# H2
# HCl
# CO
# Al2O3
# N2
# CO2
# H2O
# AlCl
V := 10 m*5 m*4 m = 200 m^3
C := [2.1375; 2.5207; 3.3809; 3.9018; 3.8553; 2.0946; 8.9243; 0.0022]*mol/kg
μ := [2.016; 36.461; 28.010; 101.960; 28.014; 44.009; 18.015; 62.435]*gm/mol
m :=
    for i ∈ 0 .. last(C)
        m[i] ← C[i]*μ[i]*100
    m
M :=
    for i ∈ 0 .. last(C)
        M[i] ← M_т*m[i]/100
    M
m = [0.43092; 9.19072; 9.4699; 39.7828; 10.8002; 9.21813; 16.0771; 0.0137357]
M = [1.86545; 39.7866; 40.9952; 172.22; 46.7542; 39.9053; 69.5979; 0.0594618] kg
C :=
    for i ∈ 0 .. last(C)
        C[i] ← M[i]/V
    C
C = [9327.26; 198933; 204976; 861098; 233771; 199526; 347989; 297.309] mg/m^3
# HCl
# CO
# Al2O3
# CO2
PDK := [0.2; 3; 6; 27000]*mg/m^3
M1 := [M[1]; M[2]; M[3]; M[5]] = [39.7866; 40.9952; 172.22; 39.9053] kg
V_потр :=
    for i ∈ 0 .. last(PDK)
        V_потр[i] ← M1[i]/PDK[i]
    V_потр
V_потр = [198933227; 13665067; 28703256; 1477.97] m^3
R_рас :=
    for i ∈ 0 .. last(PDK)
        R_рас[i] ← nthroot(V_потр[i]*3/(2*π), 3)
    R_рас
R_рас = [456.264; 186.861; 239.308; 8.90299] m
# [Excel component]
    excel["A1"] := V_потр
    excel["B1"] := R_рас
# Акустический расчет
D_a := 0.314
V := 19.0665
F_a := π*D_a^2/4 = 0.0774371
W_a := 2728.74
ρ_a := 1/V = 0.052448
# Общий уровень звуковой мощности: стр. 113 - Юдин
L_р.общ := 80*log(W_a) + 20*log(ρ_a) + 10*log(F_a) - 44 = 194.161  # дБ
# Октавные частоты:
f := [31.5; 63; 125; 500; 1000; 2000; 4000; 6000; 8000]
# Число Струхаля:
Sh :=
    for i ∈ 0 .. last(f)
        Sh[i] ← f[i]*D_a/W_a
    Sh
Sh = [0.00362475; 0.0072495; 0.0143839; 0.0575357; 0.115071; 0.230143; 0.460286; 0.690429; 0.920571]
δL_р := [25; 23; 21; 9; 5; 4.5; 6; 7; 9]
L_р :=
    for i ∈ 0 .. last(f)
        L_р[i] ← L_р.общ - δL_р[i]
    L_р
L_р = [169.161; 171.161; 173.161; 185.161; 189.161; 189.661; 188.161; 187.161; 185.161]
# Допустимые уровни шума:
# стр. 283 - Осипов
L_н := [96; 83; 74; 68; 63; 60; 57; 55; 54]
# Уровень снижения шума:
ρ_жб := 2500 kg/m^3
V_жб := 5 m*1000 mm*3 m = 15 m^3
m_жб := ρ_жб*V_жб = 37500 kg
S_жб := 5 m*3 m*3 = 45 m^2
m_жб := m_жб/S_жб = 833.333 kg/m^2
R := 300
R_0 := 1
m := 1000
C := 40
L_сниж :=
    for i ∈ 0 .. last(f)
        L_сниж[i] ← 20*log(R/R_0) + 20*log(m*f[i]) - C
    L_сниж
L_сниж = [99.5086; 105.529; 111.481; 123.522; 129.542; 135.563; 141.584; 145.105; 147.604]
L_факт := L_р - L_сниж = [69.6524; 65.6318; 61.6804; 61.6392; 59.6186; 54.098; 46.5774; 42.0556; 37.5568]
# [plot: L_р, L_факт, L_н vs f]
# [Excel component]
    excel["A1"] := f
    excel["B1"] := Sh
    excel["C1"] := δL_р
    excel["D1"] := L_р
    excel["E1"] := L_сниж
    excel["F1"] := L_факт
    excel["G1"] := L_н
