# Расчет шнекового экструдера
# Исходные данные:
Q_э := 9  # м^3/ч
p_max := 5*10^6  # Па
a := -0.56
b := 4.1
# Решение:
Q_э1 := Q_э/3600 = 0.0025  # м^3/c  # производительность экструдера
K_p := 0.1
D_ш := 4.65*(1 + K_p)^0.4*Q_э1^0.4 explicit, ALL → 4.65*(1 + 0.1)^0.4*(2.5*10^-3)^0.4 = 0.43973  # м  # диаметр шнека
D_ш := 0.450  # м
t := D_ш = 0.45  # м  # шаг
φ := atan(t/(π*D_ш)) explicit, ALL → atan(0.45/(π*0.45)) = 0.308169  # рад  # угол наклона витовой поверхности
# Глубины винтового канала:
# В зоне загрузки:
h_1 := 0.12*D_ш explicit, ALL → 0.12*0.45 = 0.054  # м
# В зоне дозирования:
h_3 := 0.5*(D_ш - sqrt(D_ш^2 - 4*h_1/3*(D_ш - h_1))) explicit, ALL → 0.5*(0.45 - sqrt(0.45^2 - 4*0.054/3*(0.45 - 0.054))) = 0.0164407  # м
# В зоне сжатия:
h_2 := h_1 - (h_1 - h_3)/2 explicit, ALL → 0.054 - (0.054 - 0.016)/2 = 0.0352203  # м
e := 0.08*D_ш explicit, ALL → 0.08*0.45 = 0.036  # м  # ширина ребра
δ := 0.0035*D_ш explicit, ALL → 3.5*10^-3*0.45 = 0.001575  # м  # радиальный зазор
n_кр := 0.75/sqrt(D_ш) explicit, ALL → 0.75/sqrt(0.45) = 1.11803  # об/c  # критическая частота вращения
n_р := 0.5*n_кр explicit, ALL → 0.5*1.118 = 0.559017  # об/с  # рабочая частота вращения
γ := (π*D_ш*n_р)/(0.4*h_1 + 0.4*h_2 + 0.2*h_3) explicit, ALL → π*0.45*0.559/(0.4*0.054 + 0.4*0.035 + 0.2*0.016) = 20.2762  # рад/с  # угловая скорость сдвига
μ := 10^(a*log(γ) + b) explicit, ALL → 10^(-0.56*log(20.276) + 4.1) = 2333.93  # Н*с/м^2  # динамическая вязкость
# Длина шнека:
L := p_max*(0.4*h_1 + 0.4*h_2 + 0.2*h_3)^2*tan(φ)/(0.6*π*D_ш*μ*n_р) explicit, ALL → 5*10^6*(0.4*0.054 + 0.4*0.035 + 0.2*0.016)^2*tan(0.308)/(0.6*π*0.45*2.334*10^3*0.559) = 2.18471
L_1 := 0.4*L explicit, ALL → 0.4*2.185 = 0.873886  # м  # зона питания
L_2 := 0.4*L explicit, ALL → 0.4*2.185 = 0.873886  # м  # зона сжатия
L_3 := 0.2*L explicit, ALL → 0.2*2.185 = 0.436943  # м  # зона дозирования
# Мощность:
N_1 := π^2/2*D_ш^2*n_р*(0.4*h_1 + 0.4*h_2 + 0.2*h_3)*p_max*tan(φ) = 34652.9  # Вт
N_2 := 2*π^3*D_ш^3*L*μ*n_р^2/((0.4*h_1 + 0.4*h_2 + 0.2*h_3)*cos(φ)) = 242441  # Вт
N := N_1 + N_2 explicit, ALL → 3.465*10^4 + 2.424*10^5 = 277094  # Вт
# Максимальное осевое усилие:
P_0 := π*p_max*D_ш^2/4 explicit, ALL → π*5*10^6*0.45^2/4 = 795216  # Н
